# OpenSim document version 40500
ScaleTool AOT_scaled:
  mass: 69.2 [kg]
  height: -1
  age: -1
  ModelScaler:
    apply: true
    scaling_order: measurements
    marker_file: ../../../../../Volumes/THOMAS/datas_manips/AOT_15_01_25/output/Model_AOT/AOT_static.trc
    time_range: 0 5.3
    preserve_mass_distribution: false
    output_model_file: ../../../../../Volumes/THOMAS/datas_manips/AOT_15_01_25/output/Model_AOT/AOT_scaled.osim
    MeasurementSet:
      Measurement pelvis: apply=true
        MarkerPair: markers=(RASIS LASIS)
        MarkerPair: markers=(LPSIS RPSIS)
        BodyScale pelvis: axes=(X Y Z)
      Measurement femur_r: apply=true
        MarkerPair: markers=(RGT RLFE)
        MarkerPair: markers=(RMFE RLFE)
        MarkerPair: markers=(RMFE RGT)
        BodyScale femur_r: axes=(X Y Z)
      Measurement tibia_r: apply=true
        MarkerPair: markers=(RLM RATT)
        MarkerPair: markers=(RSPH RATT)
        MarkerPair: markers=(RSPH RLM)
        BodyScale tibia_r: axes=(X Y Z)
      Measurement calcn_r: apply=true
        MarkerPair: markers=(RCAL RMFH1)
        MarkerPair: markers=(RMFH5 RCAL)
        BodyScale calcn_r: axes=(X Y Z)
      Measurement talus_r: apply=true
        MarkerPair: markers=(RCAL RSPH)
        MarkerPair: markers=(RCAL RLM)
        BodyScale talus_r: axes=(X Y Z)
      Measurement toes_r: apply=true
        MarkerPair: markers=(RMFH1 RTT2)
        MarkerPair: markers=(RMFH5 RTT2)
        BodyScale toes_r: axes=(X Y Z)
      Measurement torso: apply=true
        MarkerPair: markers=(STR SUP)
        MarkerPair: markers=(C7 T10)
        MarkerPair: markers=(T10 STR)
        MarkerPair: markers=(SUP C7)
        BodyScale torso: axes=(X Y Z)
      Measurement head_and_neck: apply=true
        MarkerPair: markers=(HV C7)
        MarkerPair: markers=(LTEMP RTEMP)
        MarkerPair: markers=(OCC SEL)
        BodyScale head_and_neck: axes=(X Y Z)
      Measurement humerus_r: apply=true
        MarkerPair: markers=(RA RLHE)
        MarkerPair: markers=(RA RMHE)
        BodyScale humerus_r: axes=(X Y Z)
      Measurement ulna_r: apply=true
        MarkerPair: markers=(RMHE RUS)
        BodyScale ulna_r: axes=(X Y Z)
      Measurement radius_r: apply=true
        MarkerPair: markers=(RLHE RRS)
        BodyScale radius_r: axes=(X Y Z)
      Measurement lunate_r: apply=true
        MarkerPair: markers=(RUS RRS)
        BodyScale lunate_r: axes=(X Y Z)
      Measurement hand_r: apply=true
        MarkerPair: markers=(RRS RUS)
        MarkerPair: markers=(RHMH5 RHMH2)
        MarkerPair: markers=(RUS RHMH5)
        MarkerPair: markers=(RRS RHMH2)
        BodyScale hand_r: axes=(X Y Z)
      Measurement femur_l: apply=true
        MarkerPair: markers=(LGT LLFE)
        MarkerPair: markers=(LLFE LMFE)
        MarkerPair: markers=(LMFE LGT)
        BodyScale femur_l: axes=(X Y Z)
      Measurement tibia_l: apply=true
        MarkerPair: markers=(LLM LATT)
        MarkerPair: markers=(LSPH LATT)
        MarkerPair: markers=(LSPH LLM)
        BodyScale tibia_l: axes=(X Y Z)
      Measurement talus_l: apply=true
        MarkerPair: markers=(LCAL LLM)
        MarkerPair: markers=(LCAL LSPH)
        BodyScale talus_l: axes=(X Y Z)
      Measurement calcn_l: apply=true
        MarkerPair: markers=(LCAL LMFH1)
        MarkerPair: markers=(LCAL LMFH5)
        BodyScale calcn_l: axes=(X Y Z)
      Measurement toes_l: apply=true
        MarkerPair: markers=(LMFH1 LTT2)
        MarkerPair: markers=(LMFH5 LTT2)
        BodyScale toes_l: axes=(X Y Z)
      Measurement humerus_l: apply=true
        MarkerPair: markers=(LA LLHE)
        MarkerPair: markers=(LA LMHE)
        BodyScale humerus_l: axes=(X Y Z)
      Measurement ulna_l: apply=true
        MarkerPair: markers=(LMHE LUS)
        BodyScale ulna_l: axes=(X Y Z)
      Measurement radius_l: apply=true
        MarkerPair: markers=(LLHE LRS)
        BodyScale radius_l: axes=(X Y Z)
      Measurement lunate_l: apply=true
        MarkerPair: markers=(LRS LUS)
        BodyScale lunate_l: axes=(X Y Z)
      Measurement hand_l: apply=true
        MarkerPair: markers=(LUS LRS)
        MarkerPair: markers=(LHMH2 LHMH5)
        MarkerPair: markers=(LUS LHMH5)
        MarkerPair: markers=(LRS LHMH2)
        BodyScale hand_l: axes=(X Y Z)
      Measurement fingers_r: apply=true
        MarkerPair: markers=(RHMH2 RFT3)
        MarkerPair: markers=(RHMH5 RFT3)
        BodyScale fingers_r: axes=(X Y Z)
      Measurement fingers_l: apply=true
        MarkerPair: markers=(LHMH2 LFT3)
        MarkerPair: markers=(LHMH5 LFT3)
        BodyScale fingers_l: axes=(X Y Z)
  MarkerPlacer:
    apply: true
    marker_file: ../../../../../Volumes/THOMAS/datas_manips/AOT_15_01_25/output/Model_AOT/AOT_static.trc
    time_range: 0 5.3
    output_model_file: ../../../../../Volumes/THOMAS/datas_manips/AOT_15_01_25/output/Model_AOT/AOT_scaled.osim
    max_marker_movement: -1
    IKTaskSet:
      IKMarkerTask STR: apply=true weight=1
      IKMarkerTask RA: apply=true weight=1
      IKMarkerTask LA: apply=true weight=1
      IKMarkerTask C7: apply=true weight=1
      IKMarkerTask T10: apply=true weight=1
      IKMarkerTask SUP: apply=true weight=1
      IKMarkerTask RLHE: apply=true weight=1
      IKMarkerTask RMHE: apply=true weight=1
      IKMarkerTask RUS: apply=true weight=1
      IKMarkerTask RRS: apply=true weight=1
      IKMarkerTask RHMH5: apply=true weight=1
      IKMarkerTask RHMH2: apply=true weight=1
      IKMarkerTask LLHE: apply=true weight=1
      IKMarkerTask LMHE: apply=true weight=1
      IKMarkerTask LUS: apply=true weight=1
      IKMarkerTask LRS: apply=true weight=1
      IKMarkerTask LHMH2: apply=true weight=1
      IKMarkerTask LHMH5: apply=true weight=1
      IKMarkerTask RASIS: apply=true weight=1
      IKMarkerTask LASIS: apply=true weight=1
      IKMarkerTask LPSIS: apply=true weight=1
      IKMarkerTask RPSIS: apply=true weight=1
      IKMarkerTask RLFE: apply=true weight=1
      IKMarkerTask RMFE: apply=true weight=1
      IKMarkerTask RATT: apply=true weight=1
      IKMarkerTask RLM: apply=true weight=1
      IKMarkerTask RSPH: apply=true weight=1
      IKMarkerTask RCAL: apply=true weight=1
      IKMarkerTask RMFH1: apply=true weight=1
      IKMarkerTask RMFH5: apply=true weight=1
      IKMarkerTask RGT: apply=true weight=1
      IKMarkerTask LGT: apply=true weight=1
      IKMarkerTask LLFE: apply=true weight=1
      IKMarkerTask LMFE: apply=true weight=1
      IKMarkerTask LATT: apply=true weight=1
      IKMarkerTask LLM: apply=true weight=1
      IKMarkerTask LSPH: apply=true weight=1
      IKMarkerTask LCAL: apply=true weight=1
      IKMarkerTask LMFH1: apply=true weight=1
      IKMarkerTask LMFH5: apply=true weight=1
      IKMarkerTask SEL: apply=true weight=1
      IKMarkerTask OCC: apply=true weight=1
      IKMarkerTask RTEMP: apply=true weight=1
      IKMarkerTask LTEMP: apply=true weight=1
      IKMarkerTask RTT2: apply=true weight=1
      IKMarkerTask LTT2: apply=true weight=1
      IKMarkerTask RFT3: apply=true weight=1
      IKMarkerTask LFT3: apply=true weight=1
      IKMarkerTask HV: apply=true weight=1
