# OpenSim document version 40000
Model:
  credits: Model generated by BioBuddy on 2025-10-10 13:29:52
  length_units: meters
  force_units: N
  gravity: 0 -9.80665 0
  Ground
  BodySet:
    Body root: mass=0 mass_center=(0 0 0) inertia=(0 0 0 0 0 0)
    Body pelvis_parent_offset: mass=0 mass_center=(0 0 0) inertia=(0 0 0 0 0 0)
    Body pelvis_translation: mass=0 mass_center=(0 0 0) inertia=(0 0 0 0 0 0)
    Body pelvis_rotation_transform: mass=0 mass_center=(0 0 0) inertia=(0 0 0 0 0 0)
    Body pelvis_reset_axis: mass=0 mass_center=(0 0 0) inertia=(0 0 0 0 0 0)
    Body pelvis_geom_2: mass=0 mass_center=(0 0 0) inertia=(0 0 0 0 0 0) meshes=pelvis.vtp
    Body pelvis_geom_3: mass=0 mass_center=(0 0 0) inertia=(0 0 0 0 0 0) meshes=l_pelvis.vtp
    Body pelvis: mass=11.777 mass_center=(-0.0707 0 0) inertia=(0.1028 0.0871 0.0579 0 0 0) meshes=sacrum.vtp
    Body femur_r_parent_offset: mass=0 mass_center=(0 0 0) inertia=(0 0 0 0 0 0)
    Body femur_r_translation: mass=0 mass_center=(0 0 0) inertia=(0 0 0 0 0 0)
    Body femur_r_rotation_transform: mass=0 mass_center=(0 0 0) inertia=(0 0 0 0 0 0)
    Body femur_r_reset_axis: mass=0 mass_center=(0 0 0) inertia=(0 0 0 0 0 0)
    Body femur_r: mass=9.3014 mass_center=(0 -0.17 0) inertia=(0.1339 0.0351 0.1412 0 0 0) meshes=femur_r.vtp
    Body tibia_r_parent_offset: mass=0 mass_center=(0 0 0) inertia=(0 0 0 0 0 0)
    Body tibia_r_translation: mass=0 mass_center=(0 0 0) inertia=(0 0 0 0 0 0)
    Body tibia_r_rotation_transform: mass=0 mass_center=(0 0 0) inertia=(0 0 0 0 0 0)
    Body tibia_r_reset_axis: mass=0 mass_center=(0 0 0) inertia=(0 0 0 0 0 0)
    Body tibia_r_geom_2: mass=0 mass_center=(0 0 0) inertia=(0 0 0 0 0 0) meshes=fibula_r.vtp
    Body tibia_r: mass=3.7075 mass_center=(0 -0.1867 0) inertia=(0.0504 0.0051 0.0511 0 0 0) meshes=tibia_r.vtp
    Body talus_r_parent_offset: mass=0 mass_center=(0 0 0) inertia=(0 0 0 0 0 0)
    Body talus_r_translation: mass=0 mass_center=(0 0 0) inertia=(0 0 0 0 0 0)
    Body tibia_r_offset_ankle_angle_r: mass=0 mass_center=(0 0 0) inertia=(0 0 0 0 0 0)
    Body talus_r_rotation_1: mass=0 mass_center=(0 0 0) inertia=(0 0 0 0 0 0)
    Body talus_r_rotation_2: mass=0 mass_center=(0 0 0) inertia=(0 0 0 0 0 0)
    Body talus_r_reset_axis: mass=0 mass_center=(0 0 0) inertia=(0 0 0 0 0 0)
    Body talus_r: mass=0.1 mass_center=(0 0 0) inertia=(0.001 0.001 0.001 0 0 0) meshes=talus_rv.vtp
    Body calcn_r_parent_offset: mass=0 mass_center=(0 0 0) inertia=(0 0 0 0 0 0)
    Body calcn_r_translation: mass=0 mass_center=(0 0 0) inertia=(0 0 0 0 0 0)
    Body talus_r_offset_subtalar_angle_r: mass=0 mass_center=(0 0 0) inertia=(0 0 0 0 0 0)
    Body calcn_r_rotation_1: mass=0 mass_center=(0 0 0) inertia=(0 0 0 0 0 0)
    Body calcn_r_rotation_2: mass=0 mass_center=(0 0 0) inertia=(0 0 0 0 0 0)
    Body calcn_r_reset_axis: mass=0 mass_center=(0 0 0) inertia=(0 0 0 0 0 0)
    Body calcn_r: mass=1.25 mass_center=(0.1 0.03 0) inertia=(0.0014 0.0039 0.0041 0 0 0) meshes=foot.vtp
    Body toes_r_parent_offset: mass=0 mass_center=(0 0 0) inertia=(0 0 0 0 0 0)
    Body toes_r_translation: mass=0 mass_center=(0 0 0) inertia=(0 0 0 0 0 0)
    Body toes_r_rotation_transform: mass=0 mass_center=(0 0 0) inertia=(0 0 0 0 0 0)
    Body toes_r_reset_axis: mass=0 mass_center=(0 0 0) inertia=(0 0 0 0 0 0)
    Body toes_r: mass=0.2166 mass_center=(0.0346 0.006 -0.0175) inertia=(0.0001 0.0002 0.001 0 0 0) meshes=bofoot.vtp
    Body femur_l_parent_offset: mass=0 mass_center=(0 0 0) inertia=(0 0 0 0 0 0)
    Body femur_l_translation: mass=0 mass_center=(0 0 0) inertia=(0 0 0 0 0 0)
    Body femur_l_rotation_transform: mass=0 mass_center=(0 0 0) inertia=(0 0 0 0 0 0)
    Body femur_l_reset_axis: mass=0 mass_center=(0 0 0) inertia=(0 0 0 0 0 0)
    Body femur_l: mass=9.3014 mass_center=(0 -0.17 0) inertia=(0.1339 0.0351 0.1412 0 0 0) meshes=femur_l.vtp
    Body tibia_l_parent_offset: mass=0 mass_center=(0 0 0) inertia=(0 0 0 0 0 0)
    Body tibia_l_translation: mass=0 mass_center=(0 0 0) inertia=(0 0 0 0 0 0)
    Body tibia_l_rotation_transform: mass=0 mass_center=(0 0 0) inertia=(0 0 0 0 0 0)
    Body tibia_l_reset_axis: mass=0 mass_center=(0 0 0) inertia=(0 0 0 0 0 0)
    Body tibia_l_geom_2: mass=0 mass_center=(0 0 0) inertia=(0 0 0 0 0 0) meshes=fibula_l.vtp
    Body tibia_l: mass=3.7075 mass_center=(0 -0.1867 0) inertia=(0.0504 0.0051 0.0511 0 0 0) meshes=tibia_l.vtp
    Body talus_l_parent_offset: mass=0 mass_center=(0 0 0) inertia=(0 0 0 0 0 0)
    Body talus_l_translation: mass=0 mass_center=(0 0 0) inertia=(0 0 0 0 0 0)
    Body tibia_l_offset_ankle_angle_l: mass=0 mass_center=(0 0 0) inertia=(0 0 0 0 0 0)
    Body talus_l_rotation_1: mass=0 mass_center=(0 0 0) inertia=(0 0 0 0 0 0)
    Body talus_l_rotation_2: mass=0 mass_center=(0 0 0) inertia=(0 0 0 0 0 0)
    Body talus_l_reset_axis: mass=0 mass_center=(0 0 0) inertia=(0 0 0 0 0 0)
    Body talus_l: mass=0.1 mass_center=(0 0 0) inertia=(0.001 0.001 0.001 0 0 0) meshes=talus_lv.vtp
    Body calcn_l_parent_offset: mass=0 mass_center=(0 0 0) inertia=(0 0 0 0 0 0)
    Body calcn_l_translation: mass=0 mass_center=(0 0 0) inertia=(0 0 0 0 0 0)
    Body talus_l_offset_subtalar_angle_l: mass=0 mass_center=(0 0 0) inertia=(0 0 0 0 0 0)
    Body calcn_l_rotation_1: mass=0 mass_center=(0 0 0) inertia=(0 0 0 0 0 0)
    Body calcn_l_rotation_2: mass=0 mass_center=(0 0 0) inertia=(0 0 0 0 0 0)
    Body calcn_l_reset_axis: mass=0 mass_center=(0 0 0) inertia=(0 0 0 0 0 0)
    Body calcn_l: mass=1.25 mass_center=(0.1 0.03 0) inertia=(0.0014 0.0039 0.0041 0 0 0) meshes=l_foot.vtp
    Body toes_l_parent_offset: mass=0 mass_center=(0 0 0) inertia=(0 0 0 0 0 0)
    Body toes_l_translation: mass=0 mass_center=(0 0 0) inertia=(0 0 0 0 0 0)
    Body toes_l_rotation_transform: mass=0 mass_center=(0 0 0) inertia=(0 0 0 0 0 0)
    Body toes_l_reset_axis: mass=0 mass_center=(0 0 0) inertia=(0 0 0 0 0 0)
    Body toes_l: mass=0.2166 mass_center=(0.0346 0.006 0.0175) inertia=(0.0001 0.0002 0.001 0 0 0) meshes=l_bofoot.vtp
    Body torso_parent_offset: mass=0 mass_center=(0 0 0) inertia=(0 0 0 0 0 0)
    Body torso_translation: mass=0 mass_center=(0 0 0) inertia=(0 0 0 0 0 0)
    Body torso_rotation_transform: mass=0 mass_center=(0 0 0) inertia=(0 0 0 0 0 0)
    Body torso_reset_axis: mass=0 mass_center=(0 0 0) inertia=(0 0 0 0 0 0)
    Body torso_geom_2: mass=0 mass_center=(0 0 0) inertia=(0 0 0 0 0 0) meshes=hat_ribs_scap.vtp
    Body torso: mass=21.28 mass_center=(0.003 0.246 0) inertia=(0.627499 0.627499 0.845584 0 0 0) meshes=hat_spine.vtp
    Body head_and_neck_parent_offset: mass=0 mass_center=(0 0 0) inertia=(0 0 0 0 0 0)
    Body head_and_neck_translation: mass=0 mass_center=(0 0 0) inertia=(0 0 0 0 0 0)
    Body head_and_neck_rotation_transform: mass=0 mass_center=(0 0 0) inertia=(0 0 0 0 0 0)
    Body head_and_neck_reset_axis: mass=0 mass_center=(0 0 0) inertia=(0 0 0 0 0 0)
    Body head_and_neck_geom_2: mass=0 mass_center=(0 0 0) inertia=(0 0 0 0 0 0) meshes=skull.vtp
    Body head_and_neck: mass=4.69 mass_center=(-0.006 0.149 0)
        inertia=(0.026833 0.017452 0.026933 0.000226 0.000251 0.000112) meshes=jaw.vtp
    Body humerus_r_parent_offset: mass=0 mass_center=(0 0 0) inertia=(0 0 0 0 0 0)
    Body humerus_r_translation: mass=0 mass_center=(0 0 0) inertia=(0 0 0 0 0 0)
    Body humerus_r_rotation_transform: mass=0 mass_center=(0 0 0) inertia=(0 0 0 0 0 0)
    Body humerus_r_reset_axis: mass=0 mass_center=(0 0 0) inertia=(0 0 0 0 0 0)
    Body humerus_r: mass=2.0325 mass_center=(0 -0.164502 0) inertia=(0.011946 0.004121 0.013409 0 0 0)
        meshes=humerus_rv.vtp
    Body ulna_r_parent_offset: mass=0 mass_center=(0 0 0) inertia=(0 0 0 0 0 0)
    Body ulna_r_translation: mass=0 mass_center=(0 0 0) inertia=(0 0 0 0 0 0)
    Body humerus_r_offset_elbow_flex_r: mass=0 mass_center=(0 0 0) inertia=(0 0 0 0 0 0)
    Body ulna_r_rotation_1: mass=0 mass_center=(0 0 0) inertia=(0 0 0 0 0 0)
    Body ulna_r_rotation_2: mass=0 mass_center=(0 0 0) inertia=(0 0 0 0 0 0)
    Body ulna_r_reset_axis: mass=0 mass_center=(0 0 0) inertia=(0 0 0 0 0 0)
    Body ulna_r: mass=0.6075 mass_center=(0 -0.120525 0) inertia=(0.002962 0.000618 0.003213 0 0 0) meshes=ulna_rv.vtp
    Body radius_r_parent_offset: mass=0 mass_center=(0 0 0) inertia=(0 0 0 0 0 0)
    Body radius_r_translation: mass=0 mass_center=(0 0 0) inertia=(0 0 0 0 0 0)
    Body ulna_r_offset_pro_sup_r: mass=0 mass_center=(0 0 0) inertia=(0 0 0 0 0 0)
    Body radius_r_rotation_1: mass=0 mass_center=(0 0 0) inertia=(0 0 0 0 0 0)
    Body radius_r_rotation_2: mass=0 mass_center=(0 0 0) inertia=(0 0 0 0 0 0)
    Body radius_r_reset_axis: mass=0 mass_center=(0 0 0) inertia=(0 0 0 0 0 0)
    Body radius_r: mass=0.6075 mass_center=(0 -0.120525 0) inertia=(0.002962 0.000618 0.003213 0 0 0)
        meshes=radius_rv.vtp
    Body lunate_r_parent_offset: mass=0 mass_center=(0 0 0) inertia=(0 0 0 0 0 0)
    Body lunate_r_translation: mass=0 mass_center=(0 0 0) inertia=(0 0 0 0 0 0)
    Body lunate_r_rotation_transform: mass=0 mass_center=(0 0 0) inertia=(0 0 0 0 0 0)
    Body lunate_r_reset_axis: mass=0 mass_center=(0 0 0) inertia=(0 0 0 0 0 0)
    Body lunate_r: mass=0.01 mass_center=(0 0 0) inertia=(0.00001 0.00001 0.00001 0 0 0) meshes=lunate_rvs.vtp
    Body hand_r_parent_offset: mass=0 mass_center=(0 0 0) inertia=(0 0 0 0 0 0)
    Body hand_r_translation: mass=0 mass_center=(0 0 0) inertia=(0 0 0 0 0 0)
    Body hand_r_rotation_transform: mass=0 mass_center=(0 0 0) inertia=(0 0 0 0 0 0)
    Body hand_r_reset_axis: mass=0 mass_center=(0 0 0) inertia=(0 0 0 0 0 0)
    Body hand_r_geom_2: mass=0 mass_center=(0 0 0) inertia=(0 0 0 0 0 0) meshes=scaphoid_rvs.vtp
    Body hand_r_geom_3: mass=0 mass_center=(0 0 0) inertia=(0 0 0 0 0 0) meshes=triquetrum_rvs.vtp
    Body hand_r_geom_4: mass=0 mass_center=(0 0 0) inertia=(0 0 0 0 0 0) meshes=hamate_rvs.vtp
    Body hand_r_geom_5: mass=0 mass_center=(0 0 0) inertia=(0 0 0 0 0 0) meshes=capitate_rvs.vtp
    Body hand_r_geom_6: mass=0 mass_center=(0 0 0) inertia=(0 0 0 0 0 0) meshes=trapezoid_rvs.vtp
    Body hand_r_geom_7: mass=0 mass_center=(0 0 0) inertia=(0 0 0 0 0 0) meshes=trapezium_rvs.vtp
    Body hand_r_geom_8: mass=0 mass_center=(0 0 0) inertia=(0 0 0 0 0 0) meshes=metacarpal2_rvs.vtp
    Body hand_r_geom_9: mass=0 mass_center=(0 0 0) inertia=(0 0 0 0 0 0) meshes=metacarpal3_rvs.vtp
    Body hand_r_geom_10: mass=0 mass_center=(0 0 0) inertia=(0 0 0 0 0 0) meshes=metacarpal4_rvs.vtp
    Body hand_r_geom_11: mass=0 mass_center=(0 0 0) inertia=(0 0 0 0 0 0) meshes=metacarpal5_rvs.vtp
    Body hand_r_geom_12: mass=0 mass_center=(0 0 0) inertia=(0 0 0 0 0 0) meshes=metacarpal1_rvs.vtp
    Body hand_r_geom_13: mass=0 mass_center=(0 0 0) inertia=(0 0 0 0 0 0) meshes=thumb_proximal_rvs.vtp
    Body hand_r_geom_14: mass=0 mass_center=(0 0 0) inertia=(0 0 0 0 0 0) meshes=thumb_distal_rvs.vtp
    Body hand_r: mass=0.4575 mass_center=(0 -0.068095 0) inertia=(0.000892 0.000547 0.00134 0 0 0)
        meshes=pisiform_rvs.vtp
    Body fingers_r_parent_offset: mass=0 mass_center=(0 0 0) inertia=(0 0 0 0 0 0)
    Body fingers_r_translation: mass=0 mass_center=(0 0 0) inertia=(0 0 0 0 0 0)
    Body fingers_r_rotation_transform: mass=0 mass_center=(0 0 0) inertia=(0 0 0 0 0 0)
    Body fingers_r_reset_axis: mass=0 mass_center=(0 0 0) inertia=(0 0 0 0 0 0)
    Body fingers_r_geom_2: mass=0 mass_center=(0 0 0) inertia=(0 0 0 0 0 0) meshes=index_medial_rvs.vtp
    Body fingers_r_geom_3: mass=0 mass_center=(0 0 0) inertia=(0 0 0 0 0 0) meshes=index_distal_rvs.vtp
    Body fingers_r_geom_4: mass=0 mass_center=(0 0 0) inertia=(0 0 0 0 0 0) meshes=middle_proximal_rvs.vtp
    Body fingers_r_geom_5: mass=0 mass_center=(0 0 0) inertia=(0 0 0 0 0 0) meshes=middle_medial_rvs.vtp
    Body fingers_r_geom_6: mass=0 mass_center=(0 0 0) inertia=(0 0 0 0 0 0) meshes=middle_distal_rvs.vtp
    Body fingers_r_geom_7: mass=0 mass_center=(0 0 0) inertia=(0 0 0 0 0 0) meshes=ring_proximal_rvs.vtp
    Body fingers_r_geom_8: mass=0 mass_center=(0 0 0) inertia=(0 0 0 0 0 0) meshes=ring_medial_rvs.vtp
    Body fingers_r_geom_9: mass=0 mass_center=(0 0 0) inertia=(0 0 0 0 0 0) meshes=ring_distal_rvs.vtp
    Body fingers_r_geom_10: mass=0 mass_center=(0 0 0) inertia=(0 0 0 0 0 0) meshes=little_proximal_rvs.vtp
    Body fingers_r_geom_11: mass=0 mass_center=(0 0 0) inertia=(0 0 0 0 0 0) meshes=little_medial_rvs.vtp
    Body fingers_r_geom_12: mass=0 mass_center=(0 0 0) inertia=(0 0 0 0 0 0) meshes=little_distal_rvs.vtp
    Body fingers_r: mass=0.1 mass_center=(0 -0.068095 0) inertia=(0.001 0.001 0.001 0 0 0)
        meshes=index_proximal_rvs.vtp
    Body humerus_l_parent_offset: mass=0 mass_center=(0 0 0) inertia=(0 0 0 0 0 0)
    Body humerus_l_translation: mass=0 mass_center=(0 0 0) inertia=(0 0 0 0 0 0)
    Body humerus_l_rotation_transform: mass=0 mass_center=(0 0 0) inertia=(0 0 0 0 0 0)
    Body humerus_l_reset_axis: mass=0 mass_center=(0 0 0) inertia=(0 0 0 0 0 0)
    Body humerus_l: mass=2.0325 mass_center=(0 -0.164502 0) inertia=(0.011946 0.004121 0.013409 0 0 0)
        meshes=humerus_lv.vtp
    Body ulna_l_parent_offset: mass=0 mass_center=(0 0 0) inertia=(0 0 0 0 0 0)
    Body ulna_l_translation: mass=0 mass_center=(0 0 0) inertia=(0 0 0 0 0 0)
    Body humerus_l_offset_elbow_flex_l: mass=0 mass_center=(0 0 0) inertia=(0 0 0 0 0 0)
    Body ulna_l_rotation_1: mass=0 mass_center=(0 0 0) inertia=(0 0 0 0 0 0)
    Body ulna_l_rotation_2: mass=0 mass_center=(0 0 0) inertia=(0 0 0 0 0 0)
    Body ulna_l_reset_axis: mass=0 mass_center=(0 0 0) inertia=(0 0 0 0 0 0)
    Body ulna_l: mass=0.6075 mass_center=(0 -0.120525 0) inertia=(0.002962 0.000618 0.003213 0 0 0) meshes=ulna_lv.vtp
    Body radius_l_parent_offset: mass=0 mass_center=(0 0 0) inertia=(0 0 0 0 0 0)
    Body radius_l_translation: mass=0 mass_center=(0 0 0) inertia=(0 0 0 0 0 0)
    Body ulna_l_offset_pro_sup_l: mass=0 mass_center=(0 0 0) inertia=(0 0 0 0 0 0)
    Body radius_l_rotation_1: mass=0 mass_center=(0 0 0) inertia=(0 0 0 0 0 0)
    Body radius_l_rotation_2: mass=0 mass_center=(0 0 0) inertia=(0 0 0 0 0 0)
    Body radius_l_reset_axis: mass=0 mass_center=(0 0 0) inertia=(0 0 0 0 0 0)
    Body radius_l: mass=0.6075 mass_center=(0 -0.120525 0) inertia=(0.002962 0.000618 0.003213 0 0 0)
        meshes=radius_lv.vtp
    Body lunate_l_parent_offset: mass=0 mass_center=(0 0 0) inertia=(0 0 0 0 0 0)
    Body lunate_l_translation: mass=0 mass_center=(0 0 0) inertia=(0 0 0 0 0 0)
    Body lunate_l_rotation_transform: mass=0 mass_center=(0 0 0) inertia=(0 0 0 0 0 0)
    Body lunate_l_reset_axis: mass=0 mass_center=(0 0 0) inertia=(0 0 0 0 0 0)
    Body lunate_l: mass=0.01 mass_center=(0 0 0) inertia=(0.00001 0.00001 0.00001 0 0 0) meshes=lunate_lvs.vtp
    Body hand_l_parent_offset: mass=0 mass_center=(0 0 0) inertia=(0 0 0 0 0 0)
    Body hand_l_translation: mass=0 mass_center=(0 0 0) inertia=(0 0 0 0 0 0)
    Body hand_l_rotation_transform: mass=0 mass_center=(0 0 0) inertia=(0 0 0 0 0 0)
    Body hand_l_reset_axis: mass=0 mass_center=(0 0 0) inertia=(0 0 0 0 0 0)
    Body hand_l_geom_2: mass=0 mass_center=(0 0 0) inertia=(0 0 0 0 0 0) meshes=scaphoid_lvs.vtp
    Body hand_l_geom_3: mass=0 mass_center=(0 0 0) inertia=(0 0 0 0 0 0) meshes=triquetrum_lvs.vtp
    Body hand_l_geom_4: mass=0 mass_center=(0 0 0) inertia=(0 0 0 0 0 0) meshes=hamate_lvs.vtp
    Body hand_l_geom_5: mass=0 mass_center=(0 0 0) inertia=(0 0 0 0 0 0) meshes=capitate_lvs.vtp
    Body hand_l_geom_6: mass=0 mass_center=(0 0 0) inertia=(0 0 0 0 0 0) meshes=trapezoid_lvs.vtp
    Body hand_l_geom_7: mass=0 mass_center=(0 0 0) inertia=(0 0 0 0 0 0) meshes=trapezium_lvs.vtp
    Body hand_l_geom_8: mass=0 mass_center=(0 0 0) inertia=(0 0 0 0 0 0) meshes=metacarpal2_lvs.vtp
    Body hand_l_geom_9: mass=0 mass_center=(0 0 0) inertia=(0 0 0 0 0 0) meshes=metacarpal3_lvs.vtp
    Body hand_l_geom_10: mass=0 mass_center=(0 0 0) inertia=(0 0 0 0 0 0) meshes=metacarpal4_lvs.vtp
    Body hand_l_geom_11: mass=0 mass_center=(0 0 0) inertia=(0 0 0 0 0 0) meshes=metacarpal5_lvs.vtp
    Body hand_l_geom_12: mass=0 mass_center=(0 0 0) inertia=(0 0 0 0 0 0) meshes=metacarpal1_lvs.vtp
    Body hand_l_geom_13: mass=0 mass_center=(0 0 0) inertia=(0 0 0 0 0 0) meshes=thumb_proximal_lvs.vtp
    Body hand_l_geom_14: mass=0 mass_center=(0 0 0) inertia=(0 0 0 0 0 0) meshes=thumb_distal_lvs.vtp
    Body hand_l: mass=0.4575 mass_center=(0 -0.068095 0) inertia=(0.000892 0.000547 0.00134 0 0 0)
        meshes=pisiform_lvs.vtp
    Body fingers_l_parent_offset: mass=0 mass_center=(0 0 0) inertia=(0 0 0 0 0 0)
    Body fingers_l_translation: mass=0 mass_center=(0 0 0) inertia=(0 0 0 0 0 0)
    Body fingers_l_rotation_transform: mass=0 mass_center=(0 0 0) inertia=(0 0 0 0 0 0)
    Body fingers_l_reset_axis: mass=0 mass_center=(0 0 0) inertia=(0 0 0 0 0 0)
    Body fingers_l_geom_2: mass=0 mass_center=(0 0 0) inertia=(0 0 0 0 0 0) meshes=index_medial_lvs.vtp
    Body fingers_l_geom_3: mass=0 mass_center=(0 0 0) inertia=(0 0 0 0 0 0) meshes=index_distal_lvs.vtp
    Body fingers_l_geom_4: mass=0 mass_center=(0 0 0) inertia=(0 0 0 0 0 0) meshes=middle_proximal_lvs.vtp
    Body fingers_l_geom_5: mass=0 mass_center=(0 0 0) inertia=(0 0 0 0 0 0) meshes=middle_medial_lvs.vtp
    Body fingers_l_geom_6: mass=0 mass_center=(0 0 0) inertia=(0 0 0 0 0 0) meshes=middle_distal_lvs.vtp
    Body fingers_l_geom_7: mass=0 mass_center=(0 0 0) inertia=(0 0 0 0 0 0) meshes=ring_proximal_lvs.vtp
    Body fingers_l_geom_8: mass=0 mass_center=(0 0 0) inertia=(0 0 0 0 0 0) meshes=ring_medial_lvs.vtp
    Body fingers_l_geom_9: mass=0 mass_center=(0 0 0) inertia=(0 0 0 0 0 0) meshes=ring_distal_lvs.vtp
    Body fingers_l_geom_10: mass=0 mass_center=(0 0 0) inertia=(0 0 0 0 0 0) meshes=little_proximal_lvs.vtp
    Body fingers_l_geom_11: mass=0 mass_center=(0 0 0) inertia=(0 0 0 0 0 0) meshes=little_medial_lvs.vtp
    Body fingers_l_geom_12: mass=0 mass_center=(0 0 0) inertia=(0 0 0 0 0 0) meshes=little_distal_lvs.vtp
    Body fingers_l: mass=0.1 mass_center=(0 -0.068095 0) inertia=(0.001 0.001 0.001 0 0 0)
        meshes=index_proximal_lvs.vtp
  JointSet:
    WeldJoint root_joint: socket_parent_frame=../ground socket_child_frame=../root
      PhysicalOffsetFrame ground_offset: socket_parent=../ground translation=(0 0 0)
      PhysicalOffsetFrame root_offset: socket_parent=../root translation=(0 0 0)
    WeldJoint pelvis_parent_offset_joint: socket_parent_frame=../ground socket_child_frame=../pelvis_parent_offset
      PhysicalOffsetFrame ground_offset: socket_parent=../ground translation=(0 0 0)
      PhysicalOffsetFrame pelvis_parent_offset_offset: socket_parent=../pelvis_parent_offset translation=(0 0 0)
    CustomJoint pelvis_translation_joint: socket_parent_frame=../pelvis_parent_offset
        socket_child_frame=../pelvis_translation
      PhysicalOffsetFrame pelvis_parent_offset_offset: socket_parent=../pelvis_parent_offset translation=(0 0 0)
      PhysicalOffsetFrame pelvis_translation_offset: socket_parent=../pelvis_translation translation=(0 0 0)
      Coordinate pelvis_translation_transX: default_value=0 range=(-10 10) clamped=false
      Coordinate pelvis_translation_transY: default_value=0 range=(-6 6) clamped=false
      Coordinate pelvis_translation_transZ: default_value=0 range=(-5 5) clamped=false
      SpatialTransform: axes_held_at_zero=(rotation1 rotation2 rotation3)
        TransformAxis translation1: axis=(1 0 0)
        TransformAxis translation2: axis=(0 1 0)
        TransformAxis translation3: axis=(0 0 1)
    CustomJoint pelvis_rotation_transform_joint: socket_parent_frame=../pelvis_translation
        socket_child_frame=../pelvis_rotation_transform
      PhysicalOffsetFrame pelvis_translation_offset: socket_parent=../pelvis_translation translation=(0 0 0)
          orientation=(0 -1.570796 0)
      PhysicalOffsetFrame pelvis_rotation_transform_offset: socket_parent=../pelvis_rotation_transform
          translation=(0 0 0)
      Coordinate pelvis_rotation_transform_rotX: default_value=0 range=(-3.1416 3.1416) clamped=false
      Coordinate pelvis_rotation_transform_rotY: default_value=0 range=(-3.1416 3.1416) clamped=false
      Coordinate pelvis_rotation_transform_rotZ: default_value=0 range=(-3.1416 3.1416) clamped=false
      SpatialTransform: axes_held_at_zero=(translation1 translation2 translation3)
        TransformAxis rotation1: axis=(1 0 0)
        TransformAxis rotation2: axis=(0 1 0)
        TransformAxis rotation3: axis=(0 0 1)
    WeldJoint pelvis_reset_axis_joint: socket_parent_frame=../pelvis_rotation_transform
        socket_child_frame=../pelvis_reset_axis
      PhysicalOffsetFrame pelvis_rotation_transform_offset: socket_parent=../pelvis_rotation_transform
          translation=(0 0 0) orientation=(1.570796 0 1.570796)
      PhysicalOffsetFrame pelvis_reset_axis_offset: socket_parent=../pelvis_reset_axis translation=(0 0 0)
    WeldJoint pelvis_geom_2_joint: socket_parent_frame=../pelvis_reset_axis socket_child_frame=../pelvis_geom_2
      PhysicalOffsetFrame pelvis_reset_axis_offset: socket_parent=../pelvis_reset_axis translation=(0 0 0)
      PhysicalOffsetFrame pelvis_geom_2_offset: socket_parent=../pelvis_geom_2 translation=(0 0 0)
    WeldJoint pelvis_geom_3_joint: socket_parent_frame=../pelvis_reset_axis socket_child_frame=../pelvis_geom_3
      PhysicalOffsetFrame pelvis_reset_axis_offset: socket_parent=../pelvis_reset_axis translation=(0 0 0)
      PhysicalOffsetFrame pelvis_geom_3_offset: socket_parent=../pelvis_geom_3 translation=(0 0 0)
    WeldJoint pelvis_joint: socket_parent_frame=../pelvis_geom_3 socket_child_frame=../pelvis
      PhysicalOffsetFrame pelvis_geom_3_offset: socket_parent=../pelvis_geom_3 translation=(0 0 0)
      PhysicalOffsetFrame pelvis_offset: socket_parent=../pelvis translation=(0 0 0)
    WeldJoint femur_r_parent_offset_joint: socket_parent_frame=../pelvis socket_child_frame=../femur_r_parent_offset
      PhysicalOffsetFrame pelvis_offset: socket_parent=../pelvis translation=(-0.0707 -0.0661 0.0835)
      PhysicalOffsetFrame femur_r_parent_offset_offset: socket_parent=../femur_r_parent_offset translation=(0 0 0)
    WeldJoint femur_r_translation_joint: socket_parent_frame=../femur_r_parent_offset
        socket_child_frame=../femur_r_translation
      PhysicalOffsetFrame femur_r_parent_offset_offset: socket_parent=../femur_r_parent_offset translation=(0 0 0)
      PhysicalOffsetFrame femur_r_translation_offset: socket_parent=../femur_r_translation translation=(0 0 0)
    CustomJoint femur_r_rotation_transform_joint: socket_parent_frame=../femur_r_translation
        socket_child_frame=../femur_r_rotation_transform
      PhysicalOffsetFrame femur_r_translation_offset: socket_parent=../femur_r_translation translation=(0 0 0)
          orientation=(0 -1.570796 0)
      PhysicalOffsetFrame femur_r_rotation_transform_offset: socket_parent=../femur_r_rotation_transform
          translation=(0 0 0)
      Coordinate femur_r_rotation_transform_rotX: default_value=0 range=(-2.618 2.094395) clamped=false
      Coordinate femur_r_rotation_transform_rotY: default_value=0 range=(-2.094395 2.094395) clamped=false
      Coordinate femur_r_rotation_transform_rotZ: default_value=0 range=(-2.094395 2.094395) clamped=false
      SpatialTransform: axes_held_at_zero=(translation1 translation2 translation3)
        TransformAxis rotation1: axis=(1 0 0)
        TransformAxis rotation2: axis=(0 1 0)
        TransformAxis rotation3: axis=(0 0 1)
    WeldJoint femur_r_reset_axis_joint: socket_parent_frame=../femur_r_rotation_transform
        socket_child_frame=../femur_r_reset_axis
      PhysicalOffsetFrame femur_r_rotation_transform_offset: socket_parent=../femur_r_rotation_transform
          translation=(0 0 0) orientation=(1.570796 0 1.570796)
      PhysicalOffsetFrame femur_r_reset_axis_offset: socket_parent=../femur_r_reset_axis translation=(0 0 0)
    WeldJoint femur_r_joint: socket_parent_frame=../femur_r_reset_axis socket_child_frame=../femur_r
      PhysicalOffsetFrame femur_r_reset_axis_offset: socket_parent=../femur_r_reset_axis translation=(0 0 0)
      PhysicalOffsetFrame femur_r_offset: socket_parent=../femur_r translation=(0 0 0)
    WeldJoint tibia_r_parent_offset_joint: socket_parent_frame=../femur_r socket_child_frame=../tibia_r_parent_offset
      PhysicalOffsetFrame femur_r_offset: socket_parent=../femur_r translation=(0 -0.39 0)
      PhysicalOffsetFrame tibia_r_parent_offset_offset: socket_parent=../tibia_r_parent_offset translation=(0 0 0)
    WeldJoint tibia_r_translation_joint: socket_parent_frame=../tibia_r_parent_offset
        socket_child_frame=../tibia_r_translation
      PhysicalOffsetFrame tibia_r_parent_offset_offset: socket_parent=../tibia_r_parent_offset translation=(0 0 0)
      PhysicalOffsetFrame tibia_r_translation_offset: socket_parent=../tibia_r_translation translation=(0 0 0)
    CustomJoint tibia_r_rotation_transform_joint: socket_parent_frame=../tibia_r_translation
        socket_child_frame=../tibia_r_rotation_transform
      PhysicalOffsetFrame tibia_r_translation_offset: socket_parent=../tibia_r_translation translation=(0 0 0)
          orientation=(0 -1.570796 0)
      PhysicalOffsetFrame tibia_r_rotation_transform_offset: socket_parent=../tibia_r_rotation_transform
          translation=(0 0 0)
      Coordinate tibia_r_rotation_transform_rotX: default_value=0 range=(-3.1416 0.3491) clamped=false
      SpatialTransform: axes_held_at_zero=(rotation2 rotation3 translation1 translation2 translation3)
        TransformAxis rotation1: axis=(1 0 0)
    WeldJoint tibia_r_reset_axis_joint: socket_parent_frame=../tibia_r_rotation_transform
        socket_child_frame=../tibia_r_reset_axis
      PhysicalOffsetFrame tibia_r_rotation_transform_offset: socket_parent=../tibia_r_rotation_transform
          translation=(0 0 0) orientation=(0 1.570796 0)
      PhysicalOffsetFrame tibia_r_reset_axis_offset: socket_parent=../tibia_r_reset_axis translation=(0 0 0)
    WeldJoint tibia_r_geom_2_joint: socket_parent_frame=../tibia_r_reset_axis socket_child_frame=../tibia_r_geom_2
      PhysicalOffsetFrame tibia_r_reset_axis_offset: socket_parent=../tibia_r_reset_axis translation=(0 0 0)
      PhysicalOffsetFrame tibia_r_geom_2_offset: socket_parent=../tibia_r_geom_2 translation=(0 0 0)
    WeldJoint tibia_r_joint: socket_parent_frame=../tibia_r_geom_2 socket_child_frame=../tibia_r
      PhysicalOffsetFrame tibia_r_geom_2_offset: socket_parent=../tibia_r_geom_2 translation=(0 0 0)
      PhysicalOffsetFrame tibia_r_offset: socket_parent=../tibia_r translation=(0 0 0)
    WeldJoint talus_r_parent_offset_joint: socket_parent_frame=../tibia_r socket_child_frame=../talus_r_parent_offset
      PhysicalOffsetFrame tibia_r_offset: socket_parent=../tibia_r translation=(0 -0.43 0)
      PhysicalOffsetFrame talus_r_parent_offset_offset: socket_parent=../talus_r_parent_offset translation=(0 0 0)
    WeldJoint talus_r_translation_joint: socket_parent_frame=../talus_r_parent_offset
        socket_child_frame=../talus_r_translation
      PhysicalOffsetFrame talus_r_parent_offset_offset: socket_parent=../talus_r_parent_offset translation=(0 0 0)
      PhysicalOffsetFrame talus_r_translation_offset: socket_parent=../talus_r_translation translation=(0 0 0)
    CustomJoint tibia_r_offset_ankle_angle_r_joint: socket_parent_frame=../talus_r_translation
        socket_child_frame=../tibia_r_offset_ankle_angle_r
      PhysicalOffsetFrame talus_r_translation_offset: socket_parent=../talus_r_translation translation=(0 0 0)
          orientation=(1.52967 -1.366118 -2.113749)
      PhysicalOffsetFrame tibia_r_offset_ankle_angle_r_offset: socket_parent=../tibia_r_offset_ankle_angle_r
          translation=(0 0 0)
      Coordinate tibia_r_offset_ankle_angle_r_rotX: default_value=0 range=(-1.570796 1.570796) clamped=false
      SpatialTransform: axes_held_at_zero=(rotation2 rotation3 translation1 translation2 translation3)
        TransformAxis rotation1: axis=(1 0 0)
    WeldJoint talus_r_rotation_1_joint: socket_parent_frame=../tibia_r_offset_ankle_angle_r
        socket_child_frame=../talus_r_rotation_1
      PhysicalOffsetFrame tibia_r_offset_ankle_angle_r_offset: socket_parent=../tibia_r_offset_ankle_angle_r
          translation=(0 0 0) orientation=(0.599701 0.2207753 0.3586404)
      PhysicalOffsetFrame talus_r_rotation_1_offset: socket_parent=../talus_r_rotation_1 translation=(0 0 0)
    WeldJoint talus_r_rotation_2_joint: socket_parent_frame=../talus_r_rotation_1
        socket_child_frame=../talus_r_rotation_2
      PhysicalOffsetFrame talus_r_rotation_1_offset: socket_parent=../talus_r_rotation_1 translation=(0 0 0)
          orientation=(2.970794 0.3437319 2.668548)
      PhysicalOffsetFrame talus_r_rotation_2_offset: socket_parent=../talus_r_rotation_2 translation=(0 0 0)
    WeldJoint talus_r_reset_axis_joint: socket_parent_frame=../talus_r_rotation_2
        socket_child_frame=../talus_r_reset_axis
      PhysicalOffsetFrame talus_r_rotation_2_offset: socket_parent=../talus_r_rotation_2 translation=(0 0 0)
          orientation=(-0.00000204 -1.463952 -0.4433259)
      PhysicalOffsetFrame talus_r_reset_axis_offset: socket_parent=../talus_r_reset_axis translation=(0 0 0)
    WeldJoint talus_r_joint: socket_parent_frame=../talus_r_reset_axis socket_child_frame=../talus_r
      PhysicalOffsetFrame talus_r_reset_axis_offset: socket_parent=../talus_r_reset_axis translation=(0 0 0)
      PhysicalOffsetFrame talus_r_offset: socket_parent=../talus_r translation=(0 0 0)
    WeldJoint calcn_r_parent_offset_joint: socket_parent_frame=../talus_r socket_child_frame=../calcn_r_parent_offset
      PhysicalOffsetFrame talus_r_offset: socket_parent=../talus_r translation=(-0.04877 -0.04195 0.00792)
      PhysicalOffsetFrame calcn_r_parent_offset_offset: socket_parent=../calcn_r_parent_offset translation=(0 0 0)
    WeldJoint calcn_r_translation_joint: socket_parent_frame=../calcn_r_parent_offset
        socket_child_frame=../calcn_r_translation
      PhysicalOffsetFrame calcn_r_parent_offset_offset: socket_parent=../calcn_r_parent_offset translation=(0 0 0)
      PhysicalOffsetFrame calcn_r_translation_offset: socket_parent=../calcn_r_translation translation=(0 0 0)
    CustomJoint talus_r_offset_subtalar_angle_r_joint: socket_parent_frame=../calcn_r_translation
        socket_child_frame=../talus_r_offset_subtalar_angle_r
      PhysicalOffsetFrame calcn_r_translation_offset: socket_parent=../calcn_r_translation translation=(0 0 0)
          orientation=(1.262081 0.1212464 0.6550763)
      PhysicalOffsetFrame talus_r_offset_subtalar_angle_r_offset: socket_parent=../talus_r_offset_subtalar_angle_r
          translation=(0 0 0)
      Coordinate talus_r_offset_subtalar_angle_r_rotX: default_value=0 range=(-1.570796 1.570796) clamped=false
      SpatialTransform: axes_held_at_zero=(rotation2 rotation3 translation1 translation2 translation3)
        TransformAxis rotation1: axis=(1 0 0)
    WeldJoint calcn_r_rotation_1_joint: socket_parent_frame=../talus_r_offset_subtalar_angle_r
        socket_child_frame=../calcn_r_rotation_1
      PhysicalOffsetFrame talus_r_offset_subtalar_angle_r_offset: socket_parent=../talus_r_offset_subtalar_angle_r
          translation=(0 0 0) orientation=(-1.856652 -0.7011018 0.9027019)
      PhysicalOffsetFrame calcn_r_rotation_1_offset: socket_parent=../calcn_r_rotation_1 translation=(0 0 0)
    WeldJoint calcn_r_rotation_2_joint: socket_parent_frame=../calcn_r_rotation_1
        socket_child_frame=../calcn_r_rotation_2
      PhysicalOffsetFrame calcn_r_rotation_1_offset: socket_parent=../calcn_r_rotation_1 translation=(0 0 0)
          orientation=(-2.588158 -0.7972555 2.429268)
      PhysicalOffsetFrame calcn_r_rotation_2_offset: socket_parent=../calcn_r_rotation_2 translation=(0 0 0)
    WeldJoint calcn_r_reset_axis_joint: socket_parent_frame=../calcn_r_rotation_2
        socket_child_frame=../calcn_r_reset_axis
      PhysicalOffsetFrame calcn_r_rotation_2_offset: socket_parent=../calcn_r_rotation_2 translation=(0 0 0)
          orientation=(3.141593 0.1524569 2.667368)
      PhysicalOffsetFrame calcn_r_reset_axis_offset: socket_parent=../calcn_r_reset_axis translation=(0 0 0)
    WeldJoint calcn_r_joint: socket_parent_frame=../calcn_r_reset_axis socket_child_frame=../calcn_r
      PhysicalOffsetFrame calcn_r_reset_axis_offset: socket_parent=../calcn_r_reset_axis translation=(0 0 0)
      PhysicalOffsetFrame calcn_r_offset: socket_parent=../calcn_r translation=(0 0 0)
    WeldJoint toes_r_parent_offset_joint: socket_parent_frame=../calcn_r socket_child_frame=../toes_r_parent_offset
      PhysicalOffsetFrame calcn_r_offset: socket_parent=../calcn_r translation=(0.1788 -0.002 0.00108)
      PhysicalOffsetFrame toes_r_parent_offset_offset: socket_parent=../toes_r_parent_offset translation=(0 0 0)
    WeldJoint toes_r_translation_joint: socket_parent_frame=../toes_r_parent_offset
        socket_child_frame=../toes_r_translation
      PhysicalOffsetFrame toes_r_parent_offset_offset: socket_parent=../toes_r_parent_offset translation=(0 0 0)
      PhysicalOffsetFrame toes_r_translation_offset: socket_parent=../toes_r_translation translation=(0 0 0)
    CustomJoint toes_r_rotation_transform_joint: socket_parent_frame=../toes_r_translation
        socket_child_frame=../toes_r_rotation_transform
      PhysicalOffsetFrame toes_r_translation_offset: socket_parent=../toes_r_translation translation=(0 0 0)
          orientation=(3.141593 -0.9508954 3.141593)
      PhysicalOffsetFrame toes_r_rotation_transform_offset: socket_parent=../toes_r_rotation_transform
          translation=(0 0 0)
      Coordinate toes_r_rotation_transform_rotX: default_value=0 range=(-1.570796 1.570796) clamped=false
      SpatialTransform: axes_held_at_zero=(rotation2 rotation3 translation1 translation2 translation3)
        TransformAxis rotation1: axis=(1 0 0)
    WeldJoint toes_r_reset_axis_joint: socket_parent_frame=../toes_r_rotation_transform
        socket_child_frame=../toes_r_reset_axis
      PhysicalOffsetFrame toes_r_rotation_transform_offset: socket_parent=../toes_r_rotation_transform
          translation=(0 0 0) orientation=(3.141593 0.9508954 3.141593)
      PhysicalOffsetFrame toes_r_reset_axis_offset: socket_parent=../toes_r_reset_axis translation=(0 0 0)
    WeldJoint toes_r_joint: socket_parent_frame=../toes_r_reset_axis socket_child_frame=../toes_r
      PhysicalOffsetFrame toes_r_reset_axis_offset: socket_parent=../toes_r_reset_axis translation=(0 0 0)
      PhysicalOffsetFrame toes_r_offset: socket_parent=../toes_r translation=(0 0 0)
    WeldJoint femur_l_parent_offset_joint: socket_parent_frame=../pelvis socket_child_frame=../femur_l_parent_offset
      PhysicalOffsetFrame pelvis_offset: socket_parent=../pelvis translation=(-0.0707 -0.0661 -0.0835)
      PhysicalOffsetFrame femur_l_parent_offset_offset: socket_parent=../femur_l_parent_offset translation=(0 0 0)
    WeldJoint femur_l_translation_joint: socket_parent_frame=../femur_l_parent_offset
        socket_child_frame=../femur_l_translation
      PhysicalOffsetFrame femur_l_parent_offset_offset: socket_parent=../femur_l_parent_offset translation=(0 0 0)
      PhysicalOffsetFrame femur_l_translation_offset: socket_parent=../femur_l_translation translation=(0 0 0)
    CustomJoint femur_l_rotation_transform_joint: socket_parent_frame=../femur_l_translation
        socket_child_frame=../femur_l_rotation_transform
      PhysicalOffsetFrame femur_l_translation_offset: socket_parent=../femur_l_translation translation=(0 0 0)
          orientation=(0 -1.570796 0)
      PhysicalOffsetFrame femur_l_rotation_transform_offset: socket_parent=../femur_l_rotation_transform
          translation=(0 0 0)
      Coordinate femur_l_rotation_transform_rotX: default_value=0 range=(-2.618 2.094395) clamped=false
      Coordinate femur_l_rotation_transform_rotY: default_value=0 range=(-2.094395 2.094395) clamped=false
      Coordinate femur_l_rotation_transform_rotZ: default_value=0 range=(-2.094395 2.094395) clamped=false
      SpatialTransform: axes_held_at_zero=(translation1 translation2 translation3)
        TransformAxis rotation1: axis=(1 0 0)
        TransformAxis rotation2: axis=(0 1 0)
        TransformAxis rotation3: axis=(0 0 1)
    WeldJoint femur_l_reset_axis_joint: socket_parent_frame=../femur_l_rotation_transform
        socket_child_frame=../femur_l_reset_axis
      PhysicalOffsetFrame femur_l_rotation_transform_offset: socket_parent=../femur_l_rotation_transform
          translation=(0 0 0) orientation=(-1.570796 0 -1.570796)
      PhysicalOffsetFrame femur_l_reset_axis_offset: socket_parent=../femur_l_reset_axis translation=(0 0 0)
    WeldJoint femur_l_joint: socket_parent_frame=../femur_l_reset_axis socket_child_frame=../femur_l
      PhysicalOffsetFrame femur_l_reset_axis_offset: socket_parent=../femur_l_reset_axis translation=(0 0 0)
      PhysicalOffsetFrame femur_l_offset: socket_parent=../femur_l translation=(0 0 0)
    WeldJoint tibia_l_parent_offset_joint: socket_parent_frame=../femur_l socket_child_frame=../tibia_l_parent_offset
      PhysicalOffsetFrame femur_l_offset: socket_parent=../femur_l translation=(0 -0.39 0)
      PhysicalOffsetFrame tibia_l_parent_offset_offset: socket_parent=../tibia_l_parent_offset translation=(0 0 0)
    WeldJoint tibia_l_translation_joint: socket_parent_frame=../tibia_l_parent_offset
        socket_child_frame=../tibia_l_translation
      PhysicalOffsetFrame tibia_l_parent_offset_offset: socket_parent=../tibia_l_parent_offset translation=(0 0 0)
      PhysicalOffsetFrame tibia_l_translation_offset: socket_parent=../tibia_l_translation translation=(0 0 0)
    CustomJoint tibia_l_rotation_transform_joint: socket_parent_frame=../tibia_l_translation
        socket_child_frame=../tibia_l_rotation_transform
      PhysicalOffsetFrame tibia_l_translation_offset: socket_parent=../tibia_l_translation translation=(0 0 0)
          orientation=(0 -1.570796 0)
      PhysicalOffsetFrame tibia_l_rotation_transform_offset: socket_parent=../tibia_l_rotation_transform
          translation=(0 0 0)
      Coordinate tibia_l_rotation_transform_rotX: default_value=0 range=(-3.1416 0.3491) clamped=false
      SpatialTransform: axes_held_at_zero=(rotation2 rotation3 translation1 translation2 translation3)
        TransformAxis rotation1: axis=(1 0 0)
    WeldJoint tibia_l_reset_axis_joint: socket_parent_frame=../tibia_l_rotation_transform
        socket_child_frame=../tibia_l_reset_axis
      PhysicalOffsetFrame tibia_l_rotation_transform_offset: socket_parent=../tibia_l_rotation_transform
          translation=(0 0 0) orientation=(0 1.570796 0)
      PhysicalOffsetFrame tibia_l_reset_axis_offset: socket_parent=../tibia_l_reset_axis translation=(0 0 0)
    WeldJoint tibia_l_geom_2_joint: socket_parent_frame=../tibia_l_reset_axis socket_child_frame=../tibia_l_geom_2
      PhysicalOffsetFrame tibia_l_reset_axis_offset: socket_parent=../tibia_l_reset_axis translation=(0 0 0)
      PhysicalOffsetFrame tibia_l_geom_2_offset: socket_parent=../tibia_l_geom_2 translation=(0 0 0)
    WeldJoint tibia_l_joint: socket_parent_frame=../tibia_l_geom_2 socket_child_frame=../tibia_l
      PhysicalOffsetFrame tibia_l_geom_2_offset: socket_parent=../tibia_l_geom_2 translation=(0 0 0)
      PhysicalOffsetFrame tibia_l_offset: socket_parent=../tibia_l translation=(0 0 0)
    WeldJoint talus_l_parent_offset_joint: socket_parent_frame=../tibia_l socket_child_frame=../talus_l_parent_offset
      PhysicalOffsetFrame tibia_l_offset: socket_parent=../tibia_l translation=(0 -0.43 0)
      PhysicalOffsetFrame talus_l_parent_offset_offset: socket_parent=../talus_l_parent_offset translation=(0 0 0)
    WeldJoint talus_l_translation_joint: socket_parent_frame=../talus_l_parent_offset
        socket_child_frame=../talus_l_translation
      PhysicalOffsetFrame talus_l_parent_offset_offset: socket_parent=../talus_l_parent_offset translation=(0 0 0)
      PhysicalOffsetFrame talus_l_translation_offset: socket_parent=../talus_l_translation translation=(0 0 0)
    CustomJoint tibia_l_offset_ankle_angle_l_joint: socket_parent_frame=../talus_l_translation
        socket_child_frame=../tibia_l_offset_ankle_angle_l
      PhysicalOffsetFrame talus_l_translation_offset: socket_parent=../talus_l_translation translation=(0 0 0)
          orientation=(-1.905292 -1.366117 1.027844)
      PhysicalOffsetFrame tibia_l_offset_ankle_angle_l_offset: socket_parent=../tibia_l_offset_ankle_angle_l
          translation=(0 0 0)
      Coordinate tibia_l_offset_ankle_angle_l_rotX: default_value=0 range=(-1.047198 1.047198) clamped=false
      SpatialTransform: axes_held_at_zero=(rotation2 rotation3 translation1 translation2 translation3)
        TransformAxis rotation1: axis=(1 0 0)
    WeldJoint talus_l_rotation_1_joint: socket_parent_frame=../tibia_l_offset_ankle_angle_l
        socket_child_frame=../talus_l_rotation_1
      PhysicalOffsetFrame tibia_l_offset_ankle_angle_l_offset: socket_parent=../tibia_l_offset_ankle_angle_l
          translation=(0 0 0) orientation=(1.259342 0.640463 0.8039349)
      PhysicalOffsetFrame talus_l_rotation_1_offset: socket_parent=../talus_l_rotation_1 translation=(0 0 0)
    WeldJoint talus_l_rotation_2_joint: socket_parent_frame=../talus_l_rotation_1
        socket_child_frame=../talus_l_rotation_2
      PhysicalOffsetFrame talus_l_rotation_1_offset: socket_parent=../talus_l_rotation_1 translation=(0 0 0)
          orientation=(2.601233 0.8514964 2.468389)
      PhysicalOffsetFrame talus_l_rotation_2_offset: socket_parent=../talus_l_rotation_2 translation=(0 0 0)
    WeldJoint talus_l_reset_axis_joint: socket_parent_frame=../talus_l_rotation_2
        socket_child_frame=../talus_l_reset_axis
      PhysicalOffsetFrame talus_l_rotation_2_offset: socket_parent=../talus_l_rotation_2 translation=(0 0 0)
          orientation=(3.141592 -1.463953 2.718269)
      PhysicalOffsetFrame talus_l_reset_axis_offset: socket_parent=../talus_l_reset_axis translation=(0 0 0)
    WeldJoint talus_l_joint: socket_parent_frame=../talus_l_reset_axis socket_child_frame=../talus_l
      PhysicalOffsetFrame talus_l_reset_axis_offset: socket_parent=../talus_l_reset_axis translation=(0 0 0)
      PhysicalOffsetFrame talus_l_offset: socket_parent=../talus_l translation=(0 0 0)
    WeldJoint calcn_l_parent_offset_joint: socket_parent_frame=../talus_l socket_child_frame=../calcn_l_parent_offset
      PhysicalOffsetFrame talus_l_offset: socket_parent=../talus_l translation=(-0.04877 -0.04195 -0.00792)
      PhysicalOffsetFrame calcn_l_parent_offset_offset: socket_parent=../calcn_l_parent_offset translation=(0 0 0)
    WeldJoint calcn_l_translation_joint: socket_parent_frame=../calcn_l_parent_offset
        socket_child_frame=../calcn_l_translation
      PhysicalOffsetFrame calcn_l_parent_offset_offset: socket_parent=../calcn_l_parent_offset translation=(0 0 0)
      PhysicalOffsetFrame calcn_l_translation_offset: socket_parent=../calcn_l_translation translation=(0 0 0)
    CustomJoint talus_l_offset_subtalar_angle_l_joint: socket_parent_frame=../calcn_l_translation
        socket_child_frame=../talus_l_offset_subtalar_angle_l
      PhysicalOffsetFrame calcn_l_translation_offset: socket_parent=../calcn_l_translation translation=(0 0 0)
          orientation=(2.273082 0.121246 -2.486517)
      PhysicalOffsetFrame talus_l_offset_subtalar_angle_l_offset: socket_parent=../talus_l_offset_subtalar_angle_l
          translation=(0 0 0)
      Coordinate talus_l_offset_subtalar_angle_l_rotX: default_value=0 range=(-1.570796 1.570796) clamped=false
      SpatialTransform: axes_held_at_zero=(rotation2 rotation3 translation1 translation2 translation3)
        TransformAxis rotation1: axis=(1 0 0)
    WeldJoint calcn_l_rotation_1_joint: socket_parent_frame=../talus_l_offset_subtalar_angle_l
        socket_child_frame=../calcn_l_rotation_1
      PhysicalOffsetFrame talus_l_offset_subtalar_angle_l_offset: socket_parent=../talus_l_offset_subtalar_angle_l
          translation=(0 0 0) orientation=(2.171425 0.6575825 -2.945361)
      PhysicalOffsetFrame calcn_l_rotation_1_offset: socket_parent=../calcn_l_rotation_1 translation=(0 0 0)
    WeldJoint calcn_l_rotation_2_joint: socket_parent_frame=../calcn_l_rotation_1
        socket_child_frame=../calcn_l_rotation_2
      PhysicalOffsetFrame calcn_l_rotation_1_offset: socket_parent=../calcn_l_rotation_1 translation=(0 0 0)
          orientation=(-0.1697878 0.1488755 -0.8575514)
      PhysicalOffsetFrame calcn_l_rotation_2_offset: socket_parent=../calcn_l_rotation_2 translation=(0 0 0)
    WeldJoint calcn_l_reset_axis_joint: socket_parent_frame=../calcn_l_rotation_2
        socket_child_frame=../calcn_l_reset_axis
      PhysicalOffsetFrame calcn_l_rotation_2_offset: socket_parent=../calcn_l_rotation_2 translation=(0 0 0)
          orientation=(0.00000001 0.152457 0.8448591)
      PhysicalOffsetFrame calcn_l_reset_axis_offset: socket_parent=../calcn_l_reset_axis translation=(0 0 0)
    WeldJoint calcn_l_joint: socket_parent_frame=../calcn_l_reset_axis socket_child_frame=../calcn_l
      PhysicalOffsetFrame calcn_l_reset_axis_offset: socket_parent=../calcn_l_reset_axis translation=(0 0 0)
      PhysicalOffsetFrame calcn_l_offset: socket_parent=../calcn_l translation=(0 0 0)
    WeldJoint toes_l_parent_offset_joint: socket_parent_frame=../calcn_l socket_child_frame=../toes_l_parent_offset
      PhysicalOffsetFrame calcn_l_offset: socket_parent=../calcn_l translation=(0.1788 -0.002 -0.00108)
      PhysicalOffsetFrame toes_l_parent_offset_offset: socket_parent=../toes_l_parent_offset translation=(0 0 0)
    WeldJoint toes_l_translation_joint: socket_parent_frame=../toes_l_parent_offset
        socket_child_frame=../toes_l_translation
      PhysicalOffsetFrame toes_l_parent_offset_offset: socket_parent=../toes_l_parent_offset translation=(0 0 0)
      PhysicalOffsetFrame toes_l_translation_offset: socket_parent=../toes_l_translation translation=(0 0 0)
    CustomJoint toes_l_rotation_transform_joint: socket_parent_frame=../toes_l_translation
        socket_child_frame=../toes_l_rotation_transform
      PhysicalOffsetFrame toes_l_translation_offset: socket_parent=../toes_l_translation translation=(0 0 0)
          orientation=(0 -0.9508954 0)
      PhysicalOffsetFrame toes_l_rotation_transform_offset: socket_parent=../toes_l_rotation_transform
          translation=(0 0 0)
      Coordinate toes_l_rotation_transform_rotX: default_value=0 range=(-1.047198 1.047198) clamped=false
      SpatialTransform: axes_held_at_zero=(rotation2 rotation3 translation1 translation2 translation3)
        TransformAxis rotation1: axis=(1 0 0)
    WeldJoint toes_l_reset_axis_joint: socket_parent_frame=../toes_l_rotation_transform
        socket_child_frame=../toes_l_reset_axis
      PhysicalOffsetFrame toes_l_rotation_transform_offset: socket_parent=../toes_l_rotation_transform
          translation=(0 0 0) orientation=(0 0.9508954 0)
      PhysicalOffsetFrame toes_l_reset_axis_offset: socket_parent=../toes_l_reset_axis translation=(0 0 0)
    WeldJoint toes_l_joint: socket_parent_frame=../toes_l_reset_axis socket_child_frame=../toes_l
      PhysicalOffsetFrame toes_l_reset_axis_offset: socket_parent=../toes_l_reset_axis translation=(0 0 0)
      PhysicalOffsetFrame toes_l_offset: socket_parent=../toes_l translation=(0 0 0)
    WeldJoint torso_parent_offset_joint: socket_parent_frame=../pelvis socket_child_frame=../torso_parent_offset
      PhysicalOffsetFrame pelvis_offset: socket_parent=../pelvis translation=(-0.1007 0.0815 0)
      PhysicalOffsetFrame torso_parent_offset_offset: socket_parent=../torso_parent_offset translation=(0 0 0)
    WeldJoint torso_translation_joint: socket_parent_frame=../torso_parent_offset
        socket_child_frame=../torso_translation
      PhysicalOffsetFrame torso_parent_offset_offset: socket_parent=../torso_parent_offset translation=(0 0 0)
      PhysicalOffsetFrame torso_translation_offset: socket_parent=../torso_translation translation=(0 0 0)
    CustomJoint torso_rotation_transform_joint: socket_parent_frame=../torso_translation
        socket_child_frame=../torso_rotation_transform
      PhysicalOffsetFrame torso_translation_offset: socket_parent=../torso_translation translation=(0 0 0)
          orientation=(0 -1.570796 0)
      PhysicalOffsetFrame torso_rotation_transform_offset: socket_parent=../torso_rotation_transform
          translation=(0 0 0)
      Coordinate torso_rotation_transform_rotX: default_value=0 range=(-1.570796 1.570796) clamped=false
      Coordinate torso_rotation_transform_rotY: default_value=0 range=(-1.570796 1.570796) clamped=false
      Coordinate torso_rotation_transform_rotZ: default_value=0 range=(-1.570796 1.570796) clamped=false
      SpatialTransform: axes_held_at_zero=(translation1 translation2 translation3)
        TransformAxis rotation1: axis=(1 0 0)
        TransformAxis rotation2: axis=(0 1 0)
        TransformAxis rotation3: axis=(0 0 1)
    WeldJoint torso_reset_axis_joint: socket_parent_frame=../torso_rotation_transform
        socket_child_frame=../torso_reset_axis
      PhysicalOffsetFrame torso_rotation_transform_offset: socket_parent=../torso_rotation_transform
          translation=(0 0 0) orientation=(1.570796 0 1.570796)
      PhysicalOffsetFrame torso_reset_axis_offset: socket_parent=../torso_reset_axis translation=(0 0 0)
    WeldJoint torso_geom_2_joint: socket_parent_frame=../torso_reset_axis socket_child_frame=../torso_geom_2
      PhysicalOffsetFrame torso_reset_axis_offset: socket_parent=../torso_reset_axis translation=(0 0 0)
      PhysicalOffsetFrame torso_geom_2_offset: socket_parent=../torso_geom_2 translation=(0 0 0)
    WeldJoint torso_joint: socket_parent_frame=../torso_geom_2 socket_child_frame=../torso
      PhysicalOffsetFrame torso_geom_2_offset: socket_parent=../torso_geom_2 translation=(0 0 0)
      PhysicalOffsetFrame torso_offset: socket_parent=../torso translation=(0 0 0)
    WeldJoint head_and_neck_parent_offset_joint: socket_parent_frame=../torso
        socket_child_frame=../head_and_neck_parent_offset
      PhysicalOffsetFrame torso_offset: socket_parent=../torso translation=(-0.01 0.445 0)
      PhysicalOffsetFrame head_and_neck_parent_offset_offset: socket_parent=../head_and_neck_parent_offset
          translation=(0 0 0)
    WeldJoint head_and_neck_translation_joint: socket_parent_frame=../head_and_neck_parent_offset
        socket_child_frame=../head_and_neck_translation
      PhysicalOffsetFrame head_and_neck_parent_offset_offset: socket_parent=../head_and_neck_parent_offset
          translation=(0 0 0)
      PhysicalOffsetFrame head_and_neck_translation_offset: socket_parent=../head_and_neck_translation
          translation=(0 0 0)
    CustomJoint head_and_neck_rotation_transform_joint: socket_parent_frame=../head_and_neck_translation
        socket_child_frame=../head_and_neck_rotation_transform
      PhysicalOffsetFrame head_and_neck_translation_offset: socket_parent=../head_and_neck_translation
          translation=(0 0 0) orientation=(0 -1.570796 0)
      PhysicalOffsetFrame head_and_neck_rotation_transform_offset: socket_parent=../head_and_neck_rotation_transform
          translation=(0 0 0)
      Coordinate head_and_neck_rotation_transform_rotX: default_value=0 range=(-1.74533 1.047198) clamped=false
      Coordinate head_and_neck_rotation_transform_rotY: default_value=0 range=(-0.6 0.6) clamped=false
      Coordinate head_and_neck_rotation_transform_rotZ: default_value=0 range=(-1.2217 1.2217) clamped=false
      SpatialTransform: axes_held_at_zero=(translation1 translation2 translation3)
        TransformAxis rotation1: axis=(1 0 0)
        TransformAxis rotation2: axis=(0 1 0)
        TransformAxis rotation3: axis=(0 0 1)
    WeldJoint head_and_neck_reset_axis_joint: socket_parent_frame=../head_and_neck_rotation_transform
        socket_child_frame=../head_and_neck_reset_axis
      PhysicalOffsetFrame head_and_neck_rotation_transform_offset: socket_parent=../head_and_neck_rotation_transform
          translation=(0 0 0) orientation=(1.570796 0 1.570796)
      PhysicalOffsetFrame head_and_neck_reset_axis_offset: socket_parent=../head_and_neck_reset_axis
          translation=(0 0 0)
    WeldJoint head_and_neck_geom_2_joint: socket_parent_frame=../head_and_neck_reset_axis
        socket_child_frame=../head_and_neck_geom_2
      PhysicalOffsetFrame head_and_neck_reset_axis_offset: socket_parent=../head_and_neck_reset_axis
          translation=(0 0.06 0)
      PhysicalOffsetFrame head_and_neck_geom_2_offset: socket_parent=../head_and_neck_geom_2 translation=(0 0 0)
    WeldJoint head_and_neck_joint: socket_parent_frame=../head_and_neck_geom_2 socket_child_frame=../head_and_neck
      PhysicalOffsetFrame head_and_neck_geom_2_offset: socket_parent=../head_and_neck_geom_2 translation=(0 0 0)
      PhysicalOffsetFrame head_and_neck_offset: socket_parent=../head_and_neck translation=(0 0 0)
    WeldJoint humerus_r_parent_offset_joint: socket_parent_frame=../torso socket_child_frame=../humerus_r_parent_offset
      PhysicalOffsetFrame torso_offset: socket_parent=../torso translation=(0.003155 0.3715 0.17)
      PhysicalOffsetFrame humerus_r_parent_offset_offset: socket_parent=../humerus_r_parent_offset translation=(0 0 0)
    WeldJoint humerus_r_translation_joint: socket_parent_frame=../humerus_r_parent_offset
        socket_child_frame=../humerus_r_translation
      PhysicalOffsetFrame humerus_r_parent_offset_offset: socket_parent=../humerus_r_parent_offset translation=(0 0 0)
      PhysicalOffsetFrame humerus_r_translation_offset: socket_parent=../humerus_r_translation translation=(0 0 0)
    CustomJoint humerus_r_rotation_transform_joint: socket_parent_frame=../humerus_r_translation
        socket_child_frame=../humerus_r_rotation_transform
      PhysicalOffsetFrame humerus_r_translation_offset: socket_parent=../humerus_r_translation translation=(0 0 0)
          orientation=(0 -1.570796 0)
      PhysicalOffsetFrame humerus_r_rotation_transform_offset: socket_parent=../humerus_r_rotation_transform
          translation=(0 0 0)
      Coordinate humerus_r_rotation_transform_rotX: default_value=0 range=(-1.570796 3.1416) clamped=false
      Coordinate humerus_r_rotation_transform_rotY: default_value=0 range=(-3.8397 1.570796) clamped=false
      Coordinate humerus_r_rotation_transform_rotZ: default_value=0 range=(-1.570796 1.570796) clamped=false
      SpatialTransform: axes_held_at_zero=(translation1 translation2 translation3)
        TransformAxis rotation1: axis=(1 0 0)
        TransformAxis rotation2: axis=(0 1 0)
        TransformAxis rotation3: axis=(0 0 1)
    WeldJoint humerus_r_reset_axis_joint: socket_parent_frame=../humerus_r_rotation_transform
        socket_child_frame=../humerus_r_reset_axis
      PhysicalOffsetFrame humerus_r_rotation_transform_offset: socket_parent=../humerus_r_rotation_transform
          translation=(0 0 0) orientation=(1.570796 0 1.570796)
      PhysicalOffsetFrame humerus_r_reset_axis_offset: socket_parent=../humerus_r_reset_axis translation=(0 0 0)
    WeldJoint humerus_r_joint: socket_parent_frame=../humerus_r_reset_axis socket_child_frame=../humerus_r
      PhysicalOffsetFrame humerus_r_reset_axis_offset: socket_parent=../humerus_r_reset_axis translation=(0 0 0)
      PhysicalOffsetFrame humerus_r_offset: socket_parent=../humerus_r translation=(0 0 0)
    WeldJoint ulna_r_parent_offset_joint: socket_parent_frame=../humerus_r socket_child_frame=../ulna_r_parent_offset
      PhysicalOffsetFrame humerus_r_offset: socket_parent=../humerus_r translation=(0.013144 -0.286273 -0.009595)
      PhysicalOffsetFrame ulna_r_parent_offset_offset: socket_parent=../ulna_r_parent_offset translation=(0 0 0)
    WeldJoint ulna_r_translation_joint: socket_parent_frame=../ulna_r_parent_offset
        socket_child_frame=../ulna_r_translation
      PhysicalOffsetFrame ulna_r_parent_offset_offset: socket_parent=../ulna_r_parent_offset translation=(0 0 0)
      PhysicalOffsetFrame ulna_r_translation_offset: socket_parent=../ulna_r_translation translation=(0 0 0)
    CustomJoint humerus_r_offset_elbow_flex_r_joint: socket_parent_frame=../ulna_r_translation
        socket_child_frame=../humerus_r_offset_elbow_flex_r
      PhysicalOffsetFrame ulna_r_translation_offset: socket_parent=../ulna_r_translation translation=(0 0 0)
          orientation=(-1.008604 -1.341655 0.09819855)
      PhysicalOffsetFrame humerus_r_offset_elbow_flex_r_offset: socket_parent=../humerus_r_offset_elbow_flex_r
          translation=(0 0 0)
      Coordinate humerus_r_offset_elbow_flex_r_rotX: default_value=0 range=(0 3.1416) clamped=false
      SpatialTransform: axes_held_at_zero=(rotation2 rotation3 translation1 translation2 translation3)
        TransformAxis rotation1: axis=(1 0 0)
    WeldJoint ulna_r_rotation_1_joint: socket_parent_frame=../humerus_r_offset_elbow_flex_r
        socket_child_frame=../ulna_r_rotation_1
      PhysicalOffsetFrame humerus_r_offset_elbow_flex_r_offset: socket_parent=../humerus_r_offset_elbow_flex_r
          translation=(0 0 0) orientation=(0.9190857 -0.09945391 -0.1658349)
      PhysicalOffsetFrame ulna_r_rotation_1_offset: socket_parent=../ulna_r_rotation_1 translation=(0 0 0)
    WeldJoint ulna_r_rotation_2_joint: socket_parent_frame=../ulna_r_rotation_1 socket_child_frame=../ulna_r_rotation_2
      PhysicalOffsetFrame ulna_r_rotation_1_offset: socket_parent=../ulna_r_rotation_1 translation=(0 0 0)
          orientation=(-2.955825 -0.04825761 1.822051)
      PhysicalOffsetFrame ulna_r_rotation_2_offset: socket_parent=../ulna_r_rotation_2 translation=(0 0 0)
    WeldJoint ulna_r_reset_axis_joint: socket_parent_frame=../ulna_r_rotation_2 socket_child_frame=../ulna_r_reset_axis
      PhysicalOffsetFrame ulna_r_rotation_2_offset: socket_parent=../ulna_r_rotation_2 translation=(0 0 0)
          orientation=(3.141592 -1.342721 1.826547)
      PhysicalOffsetFrame ulna_r_reset_axis_offset: socket_parent=../ulna_r_reset_axis translation=(0 0 0)
    WeldJoint ulna_r_joint: socket_parent_frame=../ulna_r_reset_axis socket_child_frame=../ulna_r
      PhysicalOffsetFrame ulna_r_reset_axis_offset: socket_parent=../ulna_r_reset_axis translation=(0 0 0)
      PhysicalOffsetFrame ulna_r_offset: socket_parent=../ulna_r translation=(0 0 0)
    WeldJoint radius_r_parent_offset_joint: socket_parent_frame=../ulna_r socket_child_frame=../radius_r_parent_offset
      PhysicalOffsetFrame ulna_r_offset: socket_parent=../ulna_r translation=(-0.006727 -0.013007 0.026083)
      PhysicalOffsetFrame radius_r_parent_offset_offset: socket_parent=../radius_r_parent_offset translation=(0 0 0)
    WeldJoint radius_r_translation_joint: socket_parent_frame=../radius_r_parent_offset
        socket_child_frame=../radius_r_translation
      PhysicalOffsetFrame radius_r_parent_offset_offset: socket_parent=../radius_r_parent_offset translation=(0 0 0)
      PhysicalOffsetFrame radius_r_translation_offset: socket_parent=../radius_r_translation translation=(0 0 0)
    CustomJoint ulna_r_offset_pro_sup_r_joint: socket_parent_frame=../radius_r_translation
        socket_child_frame=../ulna_r_offset_pro_sup_r
      PhysicalOffsetFrame radius_r_translation_offset: socket_parent=../radius_r_translation translation=(0 0 0)
          orientation=(1.79738 -0.00195202 1.514368)
      PhysicalOffsetFrame ulna_r_offset_pro_sup_r_offset: socket_parent=../ulna_r_offset_pro_sup_r translation=(0 0 0)
      Coordinate ulna_r_offset_pro_sup_r_rotX: default_value=0 range=(-3.1416 3.1416) clamped=false
      SpatialTransform: axes_held_at_zero=(rotation2 rotation3 translation1 translation2 translation3)
        TransformAxis rotation1: axis=(1 0 0)
    WeldJoint radius_r_rotation_1_joint: socket_parent_frame=../ulna_r_offset_pro_sup_r
        socket_child_frame=../radius_r_rotation_1
      PhysicalOffsetFrame ulna_r_offset_pro_sup_r_offset: socket_parent=../ulna_r_offset_pro_sup_r translation=(0 0 0)
          orientation=(-3.087023 -0.02969528 1.554583)
      PhysicalOffsetFrame radius_r_rotation_1_offset: socket_parent=../radius_r_rotation_1 translation=(0 0 0)
    WeldJoint radius_r_rotation_2_joint: socket_parent_frame=../radius_r_rotation_1
        socket_child_frame=../radius_r_rotation_2
      PhysicalOffsetFrame radius_r_rotation_1_offset: socket_parent=../radius_r_rotation_1 translation=(0 0 0)
          orientation=(-1.901217 -0.4840481 1.729079)
      PhysicalOffsetFrame radius_r_rotation_2_offset: socket_parent=../radius_r_rotation_2 translation=(0 0 0)
    WeldJoint radius_r_reset_axis_joint: socket_parent_frame=../radius_r_rotation_2
        socket_child_frame=../radius_r_reset_axis
      PhysicalOffsetFrame radius_r_rotation_2_offset: socket_parent=../radius_r_rotation_2 translation=(0 0 0)
          orientation=(-3.141592 -0.03460475 2.078108)
      PhysicalOffsetFrame radius_r_reset_axis_offset: socket_parent=../radius_r_reset_axis translation=(0 0 0)
    WeldJoint radius_r_joint: socket_parent_frame=../radius_r_reset_axis socket_child_frame=../radius_r
      PhysicalOffsetFrame radius_r_reset_axis_offset: socket_parent=../radius_r_reset_axis translation=(0 0 0)
      PhysicalOffsetFrame radius_r_offset: socket_parent=../radius_r translation=(0 0 0)
    WeldJoint lunate_r_parent_offset_joint: socket_parent_frame=../radius_r
        socket_child_frame=../lunate_r_parent_offset
      PhysicalOffsetFrame radius_r_offset: socket_parent=../radius_r translation=(-0.008797 -0.235841 0.01361)
          orientation=(0.0999996 0 0)
      PhysicalOffsetFrame lunate_r_parent_offset_offset: socket_parent=../lunate_r_parent_offset translation=(0 0 0)
    WeldJoint lunate_r_translation_joint: socket_parent_frame=../lunate_r_parent_offset
        socket_child_frame=../lunate_r_translation
      PhysicalOffsetFrame lunate_r_parent_offset_offset: socket_parent=../lunate_r_parent_offset translation=(0 0 0)
      PhysicalOffsetFrame lunate_r_translation_offset: socket_parent=../lunate_r_translation translation=(0 0 0)
    CustomJoint lunate_r_rotation_transform_joint: socket_parent_frame=../lunate_r_translation
        socket_child_frame=../lunate_r_rotation_transform
      PhysicalOffsetFrame lunate_r_translation_offset: socket_parent=../lunate_r_translation translation=(0 0 0)
          orientation=(0 -1.570796 0)
      PhysicalOffsetFrame lunate_r_rotation_transform_offset: socket_parent=../lunate_r_rotation_transform
          translation=(0 0 0)
      Coordinate lunate_r_rotation_transform_rotX: default_value=0 range=(-1.5708 1.5708) clamped=false
      SpatialTransform: axes_held_at_zero=(rotation2 rotation3 translation1 translation2 translation3)
        TransformAxis rotation1: axis=(1 0 0)
    WeldJoint lunate_r_reset_axis_joint: socket_parent_frame=../lunate_r_rotation_transform
        socket_child_frame=../lunate_r_reset_axis
      PhysicalOffsetFrame lunate_r_rotation_transform_offset: socket_parent=../lunate_r_rotation_transform
          translation=(0 0 0) orientation=(1.570796 0 1.570796)
      PhysicalOffsetFrame lunate_r_reset_axis_offset: socket_parent=../lunate_r_reset_axis translation=(0 0 0)
    WeldJoint lunate_r_joint: socket_parent_frame=../lunate_r_reset_axis socket_child_frame=../lunate_r
      PhysicalOffsetFrame lunate_r_reset_axis_offset: socket_parent=../lunate_r_reset_axis translation=(0 0 0)
      PhysicalOffsetFrame lunate_r_offset: socket_parent=../lunate_r translation=(0 0 0)
    WeldJoint hand_r_parent_offset_joint: socket_parent_frame=../lunate_r socket_child_frame=../hand_r_parent_offset
      PhysicalOffsetFrame lunate_r_offset: socket_parent=../lunate_r translation=(0 0 0)
      PhysicalOffsetFrame hand_r_parent_offset_offset: socket_parent=../hand_r_parent_offset translation=(0 0 0)
    WeldJoint hand_r_translation_joint: socket_parent_frame=../hand_r_parent_offset
        socket_child_frame=../hand_r_translation
      PhysicalOffsetFrame hand_r_parent_offset_offset: socket_parent=../hand_r_parent_offset translation=(0 0 0)
      PhysicalOffsetFrame hand_r_translation_offset: socket_parent=../hand_r_translation translation=(0 0 0)
    CustomJoint hand_r_rotation_transform_joint: socket_parent_frame=../hand_r_translation
        socket_child_frame=../hand_r_rotation_transform
      PhysicalOffsetFrame hand_r_translation_offset: socket_parent=../hand_r_translation translation=(0 0 0)
          orientation=(0 -1.570796 0)
      PhysicalOffsetFrame hand_r_rotation_transform_offset: socket_parent=../hand_r_rotation_transform
          translation=(0 0 0)
      Coordinate hand_r_rotation_transform_rotY: default_value=0 range=(-6.283185 6.283185) clamped=false
      SpatialTransform: axes_held_at_zero=(rotation1 rotation3 translation1 translation2 translation3)
        TransformAxis rotation2: axis=(0 1 0)
    WeldJoint hand_r_reset_axis_joint: socket_parent_frame=../hand_r_rotation_transform
        socket_child_frame=../hand_r_reset_axis
      PhysicalOffsetFrame hand_r_rotation_transform_offset: socket_parent=../hand_r_rotation_transform
          translation=(0 0 0) orientation=(1.570796 0 1.570796)
      PhysicalOffsetFrame hand_r_reset_axis_offset: socket_parent=../hand_r_reset_axis translation=(0 0 0)
    WeldJoint hand_r_geom_2_joint: socket_parent_frame=../hand_r_reset_axis socket_child_frame=../hand_r_geom_2
      PhysicalOffsetFrame hand_r_reset_axis_offset: socket_parent=../hand_r_reset_axis translation=(0 0 0)
      PhysicalOffsetFrame hand_r_geom_2_offset: socket_parent=../hand_r_geom_2 translation=(0 0 0)
    WeldJoint hand_r_geom_3_joint: socket_parent_frame=../hand_r_reset_axis socket_child_frame=../hand_r_geom_3
      PhysicalOffsetFrame hand_r_reset_axis_offset: socket_parent=../hand_r_reset_axis translation=(0 0 0)
      PhysicalOffsetFrame hand_r_geom_3_offset: socket_parent=../hand_r_geom_3 translation=(0 0 0)
    WeldJoint hand_r_geom_4_joint: socket_parent_frame=../hand_r_reset_axis socket_child_frame=../hand_r_geom_4
      PhysicalOffsetFrame hand_r_reset_axis_offset: socket_parent=../hand_r_reset_axis translation=(0 0 0)
      PhysicalOffsetFrame hand_r_geom_4_offset: socket_parent=../hand_r_geom_4 translation=(0 0 0)
    WeldJoint hand_r_geom_5_joint: socket_parent_frame=../hand_r_reset_axis socket_child_frame=../hand_r_geom_5
      PhysicalOffsetFrame hand_r_reset_axis_offset: socket_parent=../hand_r_reset_axis translation=(0 0 0)
      PhysicalOffsetFrame hand_r_geom_5_offset: socket_parent=../hand_r_geom_5 translation=(0 0 0)
    WeldJoint hand_r_geom_6_joint: socket_parent_frame=../hand_r_reset_axis socket_child_frame=../hand_r_geom_6
      PhysicalOffsetFrame hand_r_reset_axis_offset: socket_parent=../hand_r_reset_axis translation=(0 0 0)
      PhysicalOffsetFrame hand_r_geom_6_offset: socket_parent=../hand_r_geom_6 translation=(0 0 0)
    WeldJoint hand_r_geom_7_joint: socket_parent_frame=../hand_r_reset_axis socket_child_frame=../hand_r_geom_7
      PhysicalOffsetFrame hand_r_reset_axis_offset: socket_parent=../hand_r_reset_axis translation=(0 0 0)
      PhysicalOffsetFrame hand_r_geom_7_offset: socket_parent=../hand_r_geom_7 translation=(0 0 0)
    WeldJoint hand_r_geom_8_joint: socket_parent_frame=../hand_r_reset_axis socket_child_frame=../hand_r_geom_8
      PhysicalOffsetFrame hand_r_reset_axis_offset: socket_parent=../hand_r_reset_axis translation=(0 0 0)
      PhysicalOffsetFrame hand_r_geom_8_offset: socket_parent=../hand_r_geom_8 translation=(0 0 0)
    WeldJoint hand_r_geom_9_joint: socket_parent_frame=../hand_r_reset_axis socket_child_frame=../hand_r_geom_9
      PhysicalOffsetFrame hand_r_reset_axis_offset: socket_parent=../hand_r_reset_axis translation=(0 0 0)
      PhysicalOffsetFrame hand_r_geom_9_offset: socket_parent=../hand_r_geom_9 translation=(0 0 0)
    WeldJoint hand_r_geom_10_joint: socket_parent_frame=../hand_r_reset_axis socket_child_frame=../hand_r_geom_10
      PhysicalOffsetFrame hand_r_reset_axis_offset: socket_parent=../hand_r_reset_axis translation=(0 0 0)
      PhysicalOffsetFrame hand_r_geom_10_offset: socket_parent=../hand_r_geom_10 translation=(0 0 0)
    WeldJoint hand_r_geom_11_joint: socket_parent_frame=../hand_r_reset_axis socket_child_frame=../hand_r_geom_11
      PhysicalOffsetFrame hand_r_reset_axis_offset: socket_parent=../hand_r_reset_axis translation=(0 0 0)
      PhysicalOffsetFrame hand_r_geom_11_offset: socket_parent=../hand_r_geom_11 translation=(0 0 0)
    WeldJoint hand_r_geom_12_joint: socket_parent_frame=../hand_r_reset_axis socket_child_frame=../hand_r_geom_12
      PhysicalOffsetFrame hand_r_reset_axis_offset: socket_parent=../hand_r_reset_axis translation=(0 0 0)
      PhysicalOffsetFrame hand_r_geom_12_offset: socket_parent=../hand_r_geom_12 translation=(0 0 0)
    WeldJoint hand_r_geom_13_joint: socket_parent_frame=../hand_r_reset_axis socket_child_frame=../hand_r_geom_13
      PhysicalOffsetFrame hand_r_reset_axis_offset: socket_parent=../hand_r_reset_axis translation=(0 0 0)
      PhysicalOffsetFrame hand_r_geom_13_offset: socket_parent=../hand_r_geom_13 translation=(0 0 0)
    WeldJoint hand_r_geom_14_joint: socket_parent_frame=../hand_r_reset_axis socket_child_frame=../hand_r_geom_14
      PhysicalOffsetFrame hand_r_reset_axis_offset: socket_parent=../hand_r_reset_axis translation=(0 0 0)
      PhysicalOffsetFrame hand_r_geom_14_offset: socket_parent=../hand_r_geom_14 translation=(0 0 0)
    WeldJoint hand_r_joint: socket_parent_frame=../hand_r_geom_14 socket_child_frame=../hand_r
      PhysicalOffsetFrame hand_r_geom_14_offset: socket_parent=../hand_r_geom_14 translation=(0 0 0)
      PhysicalOffsetFrame hand_r_offset: socket_parent=../hand_r translation=(0 0 0)
    WeldJoint fingers_r_parent_offset_joint: socket_parent_frame=../hand_r
        socket_child_frame=../fingers_r_parent_offset
      PhysicalOffsetFrame hand_r_offset: socket_parent=../hand_r translation=(0 -0.077 -0.01)
      PhysicalOffsetFrame fingers_r_parent_offset_offset: socket_parent=../fingers_r_parent_offset translation=(0 0 0)
    WeldJoint fingers_r_translation_joint: socket_parent_frame=../fingers_r_parent_offset
        socket_child_frame=../fingers_r_translation
      PhysicalOffsetFrame fingers_r_parent_offset_offset: socket_parent=../fingers_r_parent_offset translation=(0 0 0)
      PhysicalOffsetFrame fingers_r_translation_offset: socket_parent=../fingers_r_translation translation=(0 0 0)
    CustomJoint fingers_r_rotation_transform_joint: socket_parent_frame=../fingers_r_translation
        socket_child_frame=../fingers_r_rotation_transform
      PhysicalOffsetFrame fingers_r_translation_offset: socket_parent=../fingers_r_translation translation=(0 0 0)
          orientation=(0 -1.570796 0)
      PhysicalOffsetFrame fingers_r_rotation_transform_offset: socket_parent=../fingers_r_rotation_transform
          translation=(0 0 0)
      Coordinate fingers_r_rotation_transform_rotX: default_value=0 range=(-1.5708 1.5708) clamped=false
      SpatialTransform: axes_held_at_zero=(rotation2 rotation3 translation1 translation2 translation3)
        TransformAxis rotation1: axis=(1 0 0)
    WeldJoint fingers_r_reset_axis_joint: socket_parent_frame=../fingers_r_rotation_transform
        socket_child_frame=../fingers_r_reset_axis
      PhysicalOffsetFrame fingers_r_rotation_transform_offset: socket_parent=../fingers_r_rotation_transform
          translation=(0 0 0) orientation=(1.570796 0 1.570796)
      PhysicalOffsetFrame fingers_r_reset_axis_offset: socket_parent=../fingers_r_reset_axis translation=(0 0 0)
    WeldJoint fingers_r_geom_2_joint: socket_parent_frame=../fingers_r_reset_axis
        socket_child_frame=../fingers_r_geom_2
      PhysicalOffsetFrame fingers_r_reset_axis_offset: socket_parent=../fingers_r_reset_axis translation=(0 0.09 0.01)
      PhysicalOffsetFrame fingers_r_geom_2_offset: socket_parent=../fingers_r_geom_2 translation=(0 0 0)
    WeldJoint fingers_r_geom_3_joint: socket_parent_frame=../fingers_r_reset_axis
        socket_child_frame=../fingers_r_geom_3
      PhysicalOffsetFrame fingers_r_reset_axis_offset: socket_parent=../fingers_r_reset_axis translation=(0 0.09 0.01)
      PhysicalOffsetFrame fingers_r_geom_3_offset: socket_parent=../fingers_r_geom_3 translation=(0 0 0)
    WeldJoint fingers_r_geom_4_joint: socket_parent_frame=../fingers_r_reset_axis
        socket_child_frame=../fingers_r_geom_4
      PhysicalOffsetFrame fingers_r_reset_axis_offset: socket_parent=../fingers_r_reset_axis translation=(0 0.09 0.01)
      PhysicalOffsetFrame fingers_r_geom_4_offset: socket_parent=../fingers_r_geom_4 translation=(0 0 0)
    WeldJoint fingers_r_geom_5_joint: socket_parent_frame=../fingers_r_reset_axis
        socket_child_frame=../fingers_r_geom_5
      PhysicalOffsetFrame fingers_r_reset_axis_offset: socket_parent=../fingers_r_reset_axis translation=(0 0.09 0.01)
      PhysicalOffsetFrame fingers_r_geom_5_offset: socket_parent=../fingers_r_geom_5 translation=(0 0 0)
    WeldJoint fingers_r_geom_6_joint: socket_parent_frame=../fingers_r_reset_axis
        socket_child_frame=../fingers_r_geom_6
      PhysicalOffsetFrame fingers_r_reset_axis_offset: socket_parent=../fingers_r_reset_axis translation=(0 0.09 0.01)
      PhysicalOffsetFrame fingers_r_geom_6_offset: socket_parent=../fingers_r_geom_6 translation=(0 0 0)
    WeldJoint fingers_r_geom_7_joint: socket_parent_frame=../fingers_r_reset_axis
        socket_child_frame=../fingers_r_geom_7
      PhysicalOffsetFrame fingers_r_reset_axis_offset: socket_parent=../fingers_r_reset_axis translation=(0 0.09 0.01)
      PhysicalOffsetFrame fingers_r_geom_7_offset: socket_parent=../fingers_r_geom_7 translation=(0 0 0)
    WeldJoint fingers_r_geom_8_joint: socket_parent_frame=../fingers_r_reset_axis
        socket_child_frame=../fingers_r_geom_8
      PhysicalOffsetFrame fingers_r_reset_axis_offset: socket_parent=../fingers_r_reset_axis translation=(0 0.09 0.01)
      PhysicalOffsetFrame fingers_r_geom_8_offset: socket_parent=../fingers_r_geom_8 translation=(0 0 0)
    WeldJoint fingers_r_geom_9_joint: socket_parent_frame=../fingers_r_reset_axis
        socket_child_frame=../fingers_r_geom_9
      PhysicalOffsetFrame fingers_r_reset_axis_offset: socket_parent=../fingers_r_reset_axis translation=(0 0.09 0.01)
      PhysicalOffsetFrame fingers_r_geom_9_offset: socket_parent=../fingers_r_geom_9 translation=(0 0 0)
    WeldJoint fingers_r_geom_10_joint: socket_parent_frame=../fingers_r_reset_axis
        socket_child_frame=../fingers_r_geom_10
      PhysicalOffsetFrame fingers_r_reset_axis_offset: socket_parent=../fingers_r_reset_axis translation=(0 0.09 0.01)
      PhysicalOffsetFrame fingers_r_geom_10_offset: socket_parent=../fingers_r_geom_10 translation=(0 0 0)
    WeldJoint fingers_r_geom_11_joint: socket_parent_frame=../fingers_r_reset_axis
        socket_child_frame=../fingers_r_geom_11
      PhysicalOffsetFrame fingers_r_reset_axis_offset: socket_parent=../fingers_r_reset_axis translation=(0 0.09 0.01)
      PhysicalOffsetFrame fingers_r_geom_11_offset: socket_parent=../fingers_r_geom_11 translation=(0 0 0)
    WeldJoint fingers_r_geom_12_joint: socket_parent_frame=../fingers_r_reset_axis
        socket_child_frame=../fingers_r_geom_12
      PhysicalOffsetFrame fingers_r_reset_axis_offset: socket_parent=../fingers_r_reset_axis translation=(0 0.09 0.01)
      PhysicalOffsetFrame fingers_r_geom_12_offset: socket_parent=../fingers_r_geom_12 translation=(0 0 0)
    WeldJoint fingers_r_joint: socket_parent_frame=../fingers_r_geom_12 socket_child_frame=../fingers_r
      PhysicalOffsetFrame fingers_r_geom_12_offset: socket_parent=../fingers_r_geom_12 translation=(0 0 0)
      PhysicalOffsetFrame fingers_r_offset: socket_parent=../fingers_r translation=(0 0 0)
    WeldJoint humerus_l_parent_offset_joint: socket_parent_frame=../torso socket_child_frame=../humerus_l_parent_offset
      PhysicalOffsetFrame torso_offset: socket_parent=../torso translation=(0.003155 0.3715 -0.17)
      PhysicalOffsetFrame humerus_l_parent_offset_offset: socket_parent=../humerus_l_parent_offset translation=(0 0 0)
    WeldJoint humerus_l_translation_joint: socket_parent_frame=../humerus_l_parent_offset
        socket_child_frame=../humerus_l_translation
      PhysicalOffsetFrame humerus_l_parent_offset_offset: socket_parent=../humerus_l_parent_offset translation=(0 0 0)
      PhysicalOffsetFrame humerus_l_translation_offset: socket_parent=../humerus_l_translation translation=(0 0 0)
    CustomJoint humerus_l_rotation_transform_joint: socket_parent_frame=../humerus_l_translation
        socket_child_frame=../humerus_l_rotation_transform
      PhysicalOffsetFrame humerus_l_translation_offset: socket_parent=../humerus_l_translation translation=(0 0 0)
          orientation=(0 -1.570796 0)
      PhysicalOffsetFrame humerus_l_rotation_transform_offset: socket_parent=../humerus_l_rotation_transform
          translation=(0 0 0)
      Coordinate humerus_l_rotation_transform_rotX: default_value=0 range=(-1.570796 3.1416) clamped=false
      Coordinate humerus_l_rotation_transform_rotY: default_value=0 range=(-3.8397 1.570796) clamped=false
      Coordinate humerus_l_rotation_transform_rotZ: default_value=0 range=(-1.570796 1.570796) clamped=false
      SpatialTransform: axes_held_at_zero=(translation1 translation2 translation3)
        TransformAxis rotation1: axis=(1 0 0)
        TransformAxis rotation2: axis=(0 1 0)
        TransformAxis rotation3: axis=(0 0 1)
    WeldJoint humerus_l_reset_axis_joint: socket_parent_frame=../humerus_l_rotation_transform
        socket_child_frame=../humerus_l_reset_axis
      PhysicalOffsetFrame humerus_l_rotation_transform_offset: socket_parent=../humerus_l_rotation_transform
          translation=(0 0 0) orientation=(-1.570796 0 -1.570796)
      PhysicalOffsetFrame humerus_l_reset_axis_offset: socket_parent=../humerus_l_reset_axis translation=(0 0 0)
    WeldJoint humerus_l_joint: socket_parent_frame=../humerus_l_reset_axis socket_child_frame=../humerus_l
      PhysicalOffsetFrame humerus_l_reset_axis_offset: socket_parent=../humerus_l_reset_axis translation=(0 0 0)
      PhysicalOffsetFrame humerus_l_offset: socket_parent=../humerus_l translation=(0 0 0)
    WeldJoint ulna_l_parent_offset_joint: socket_parent_frame=../humerus_l socket_child_frame=../ulna_l_parent_offset
      PhysicalOffsetFrame humerus_l_offset: socket_parent=../humerus_l translation=(0.013144 -0.286273 0.009595)
      PhysicalOffsetFrame ulna_l_parent_offset_offset: socket_parent=../ulna_l_parent_offset translation=(0 0 0)
    WeldJoint ulna_l_translation_joint: socket_parent_frame=../ulna_l_parent_offset
        socket_child_frame=../ulna_l_translation
      PhysicalOffsetFrame ulna_l_parent_offset_offset: socket_parent=../ulna_l_parent_offset translation=(0 0 0)
      PhysicalOffsetFrame ulna_l_translation_offset: socket_parent=../ulna_l_translation translation=(0 0 0)
    CustomJoint humerus_l_offset_elbow_flex_l_joint: socket_parent_frame=../ulna_l_translation
        socket_child_frame=../humerus_l_offset_elbow_flex_l
      PhysicalOffsetFrame ulna_l_translation_offset: socket_parent=../ulna_l_translation translation=(0 0 0)
          orientation=(3.021623 -1.341655 -3.043394)
      PhysicalOffsetFrame humerus_l_offset_elbow_flex_l_offset: socket_parent=../humerus_l_offset_elbow_flex_l
          translation=(0 0 0)
      Coordinate humerus_l_offset_elbow_flex_l_rotX: default_value=0 range=(0 3.1416) clamped=false
      SpatialTransform: axes_held_at_zero=(rotation2 rotation3 translation1 translation2 translation3)
        TransformAxis rotation1: axis=(1 0 0)
    WeldJoint ulna_l_rotation_1_joint: socket_parent_frame=../humerus_l_offset_elbow_flex_l
        socket_child_frame=../ulna_l_rotation_1
      PhysicalOffsetFrame humerus_l_offset_elbow_flex_l_offset: socket_parent=../humerus_l_offset_elbow_flex_l
          translation=(0 0 0) orientation=(0.06969892 1.214156 0.08760371)
      PhysicalOffsetFrame ulna_l_rotation_1_offset: socket_parent=../ulna_l_rotation_1 translation=(0 0 0)
    WeldJoint ulna_l_rotation_2_joint: socket_parent_frame=../ulna_l_rotation_1 socket_child_frame=../ulna_l_rotation_2
      PhysicalOffsetFrame ulna_l_rotation_1_offset: socket_parent=../ulna_l_rotation_1 translation=(0 0 0)
          orientation=(2.009229 0.61034 1.833323)
      PhysicalOffsetFrame ulna_l_rotation_2_offset: socket_parent=../ulna_l_rotation_2 translation=(0 0 0)
    WeldJoint ulna_l_reset_axis_joint: socket_parent_frame=../ulna_l_rotation_2 socket_child_frame=../ulna_l_reset_axis
      PhysicalOffsetFrame ulna_l_rotation_2_offset: socket_parent=../ulna_l_rotation_2 translation=(0 0 0)
          orientation=(0.00000107 -1.342721 -0.9130584)
      PhysicalOffsetFrame ulna_l_reset_axis_offset: socket_parent=../ulna_l_reset_axis translation=(0 0 0)
    WeldJoint ulna_l_joint: socket_parent_frame=../ulna_l_reset_axis socket_child_frame=../ulna_l
      PhysicalOffsetFrame ulna_l_reset_axis_offset: socket_parent=../ulna_l_reset_axis translation=(0 0 0)
      PhysicalOffsetFrame ulna_l_offset: socket_parent=../ulna_l translation=(0 0 0)
    WeldJoint radius_l_parent_offset_joint: socket_parent_frame=../ulna_l socket_child_frame=../radius_l_parent_offset
      PhysicalOffsetFrame ulna_l_offset: socket_parent=../ulna_l translation=(-0.006727 -0.013007 -0.026083)
      PhysicalOffsetFrame radius_l_parent_offset_offset: socket_parent=../radius_l_parent_offset translation=(0 0 0)
    WeldJoint radius_l_translation_joint: socket_parent_frame=../radius_l_parent_offset
        socket_child_frame=../radius_l_translation
      PhysicalOffsetFrame radius_l_parent_offset_offset: socket_parent=../radius_l_parent_offset translation=(0 0 0)
      PhysicalOffsetFrame radius_l_translation_offset: socket_parent=../radius_l_translation translation=(0 0 0)
    CustomJoint ulna_l_offset_pro_sup_l_joint: socket_parent_frame=../radius_l_translation
        socket_child_frame=../ulna_l_offset_pro_sup_l
      PhysicalOffsetFrame radius_l_translation_offset: socket_parent=../radius_l_translation translation=(0 0 0)
          orientation=(0.5352106 -0.00195201 -1.627225)
      PhysicalOffsetFrame ulna_l_offset_pro_sup_l_offset: socket_parent=../ulna_l_offset_pro_sup_l translation=(0 0 0)
      Coordinate ulna_l_offset_pro_sup_l_rotX: default_value=0 range=(-3.1416 3.1416) clamped=false
      SpatialTransform: axes_held_at_zero=(rotation2 rotation3 translation1 translation2 translation3)
        TransformAxis rotation1: axis=(1 0 0)
    WeldJoint radius_l_rotation_1_joint: socket_parent_frame=../ulna_l_offset_pro_sup_l
        socket_child_frame=../radius_l_rotation_1
      PhysicalOffsetFrame ulna_l_offset_pro_sup_l_offset: socket_parent=../ulna_l_offset_pro_sup_l translation=(0 0 0)
          orientation=(0.03265641 -0.3700111 1.606541)
      PhysicalOffsetFrame radius_l_rotation_1_offset: socket_parent=../radius_l_rotation_1 translation=(0 0 0)
    WeldJoint radius_l_rotation_2_joint: socket_parent_frame=../radius_l_rotation_1
        socket_child_frame=../radius_l_rotation_2
      PhysicalOffsetFrame radius_l_rotation_1_offset: socket_parent=../radius_l_rotation_1 translation=(0 0 0)
          orientation=(-0.937009 0.07760595 -1.51388)
      PhysicalOffsetFrame radius_l_rotation_2_offset: socket_parent=../radius_l_rotation_2 translation=(0 0 0)
    WeldJoint radius_l_reset_axis_joint: socket_parent_frame=../radius_l_rotation_2
        socket_child_frame=../radius_l_reset_axis
      PhysicalOffsetFrame radius_l_rotation_2_offset: socket_parent=../radius_l_rotation_2 translation=(0 0 0)
          orientation=(-0.00000017 -0.03459689 1.47459)
      PhysicalOffsetFrame radius_l_reset_axis_offset: socket_parent=../radius_l_reset_axis translation=(0 0 0)
    WeldJoint radius_l_joint: socket_parent_frame=../radius_l_reset_axis socket_child_frame=../radius_l
      PhysicalOffsetFrame radius_l_reset_axis_offset: socket_parent=../radius_l_reset_axis translation=(0 0 0)
      PhysicalOffsetFrame radius_l_offset: socket_parent=../radius_l translation=(0 0 0)
    WeldJoint lunate_l_parent_offset_joint: socket_parent_frame=../radius_l
        socket_child_frame=../lunate_l_parent_offset
      PhysicalOffsetFrame radius_l_offset: socket_parent=../radius_l translation=(-0.008797 -0.235841 -0.01361)
      PhysicalOffsetFrame lunate_l_parent_offset_offset: socket_parent=../lunate_l_parent_offset translation=(0 0 0)
    WeldJoint lunate_l_translation_joint: socket_parent_frame=../lunate_l_parent_offset
        socket_child_frame=../lunate_l_translation
      PhysicalOffsetFrame lunate_l_parent_offset_offset: socket_parent=../lunate_l_parent_offset translation=(0 0 0)
      PhysicalOffsetFrame lunate_l_translation_offset: socket_parent=../lunate_l_translation translation=(0 0 0)
    CustomJoint lunate_l_rotation_transform_joint: socket_parent_frame=../lunate_l_translation
        socket_child_frame=../lunate_l_rotation_transform
      PhysicalOffsetFrame lunate_l_translation_offset: socket_parent=../lunate_l_translation translation=(0 0 0)
          orientation=(0 -1.570796 0)
      PhysicalOffsetFrame lunate_l_rotation_transform_offset: socket_parent=../lunate_l_rotation_transform
          translation=(0 0 0)
      Coordinate lunate_l_rotation_transform_rotX: default_value=0 range=(-1.5708 1.5708) clamped=false
      SpatialTransform: axes_held_at_zero=(rotation2 rotation3 translation1 translation2 translation3)
        TransformAxis rotation1: axis=(1 0 0)
    WeldJoint lunate_l_reset_axis_joint: socket_parent_frame=../lunate_l_rotation_transform
        socket_child_frame=../lunate_l_reset_axis
      PhysicalOffsetFrame lunate_l_rotation_transform_offset: socket_parent=../lunate_l_rotation_transform
          translation=(0 0 0) orientation=(-1.570796 0 -1.570796)
      PhysicalOffsetFrame lunate_l_reset_axis_offset: socket_parent=../lunate_l_reset_axis translation=(0 0 0)
    WeldJoint lunate_l_joint: socket_parent_frame=../lunate_l_reset_axis socket_child_frame=../lunate_l
      PhysicalOffsetFrame lunate_l_reset_axis_offset: socket_parent=../lunate_l_reset_axis translation=(0 0 0)
      PhysicalOffsetFrame lunate_l_offset: socket_parent=../lunate_l translation=(0 0 0)
    WeldJoint hand_l_parent_offset_joint: socket_parent_frame=../lunate_l socket_child_frame=../hand_l_parent_offset
      PhysicalOffsetFrame lunate_l_offset: socket_parent=../lunate_l translation=(0 0 0)
      PhysicalOffsetFrame hand_l_parent_offset_offset: socket_parent=../hand_l_parent_offset translation=(0 0 0)
    WeldJoint hand_l_translation_joint: socket_parent_frame=../hand_l_parent_offset
        socket_child_frame=../hand_l_translation
      PhysicalOffsetFrame hand_l_parent_offset_offset: socket_parent=../hand_l_parent_offset translation=(0 0 0)
      PhysicalOffsetFrame hand_l_translation_offset: socket_parent=../hand_l_translation translation=(0 0 0)
    CustomJoint hand_l_rotation_transform_joint: socket_parent_frame=../hand_l_translation
        socket_child_frame=../hand_l_rotation_transform
      PhysicalOffsetFrame hand_l_translation_offset: socket_parent=../hand_l_translation translation=(0 0 0)
          orientation=(0 -1.570796 0)
      PhysicalOffsetFrame hand_l_rotation_transform_offset: socket_parent=../hand_l_rotation_transform
          translation=(0 0 0)
      Coordinate hand_l_rotation_transform_rotY: default_value=0 range=(-6.283185 6.283185) clamped=false
      SpatialTransform: axes_held_at_zero=(rotation1 rotation3 translation1 translation2 translation3)
        TransformAxis rotation2: axis=(0 1 0)
    WeldJoint hand_l_reset_axis_joint: socket_parent_frame=../hand_l_rotation_transform
        socket_child_frame=../hand_l_reset_axis
      PhysicalOffsetFrame hand_l_rotation_transform_offset: socket_parent=../hand_l_rotation_transform
          translation=(0 0 0) orientation=(-1.570796 0 -1.570796)
      PhysicalOffsetFrame hand_l_reset_axis_offset: socket_parent=../hand_l_reset_axis translation=(0 0 0)
    WeldJoint hand_l_geom_2_joint: socket_parent_frame=../hand_l_reset_axis socket_child_frame=../hand_l_geom_2
      PhysicalOffsetFrame hand_l_reset_axis_offset: socket_parent=../hand_l_reset_axis translation=(0 0 0)
      PhysicalOffsetFrame hand_l_geom_2_offset: socket_parent=../hand_l_geom_2 translation=(0 0 0)
    WeldJoint hand_l_geom_3_joint: socket_parent_frame=../hand_l_reset_axis socket_child_frame=../hand_l_geom_3
      PhysicalOffsetFrame hand_l_reset_axis_offset: socket_parent=../hand_l_reset_axis translation=(0 0 0)
      PhysicalOffsetFrame hand_l_geom_3_offset: socket_parent=../hand_l_geom_3 translation=(0 0 0)
    WeldJoint hand_l_geom_4_joint: socket_parent_frame=../hand_l_reset_axis socket_child_frame=../hand_l_geom_4
      PhysicalOffsetFrame hand_l_reset_axis_offset: socket_parent=../hand_l_reset_axis translation=(0 0 0)
      PhysicalOffsetFrame hand_l_geom_4_offset: socket_parent=../hand_l_geom_4 translation=(0 0 0)
    WeldJoint hand_l_geom_5_joint: socket_parent_frame=../hand_l_reset_axis socket_child_frame=../hand_l_geom_5
      PhysicalOffsetFrame hand_l_reset_axis_offset: socket_parent=../hand_l_reset_axis translation=(0 0 0)
      PhysicalOffsetFrame hand_l_geom_5_offset: socket_parent=../hand_l_geom_5 translation=(0 0 0)
    WeldJoint hand_l_geom_6_joint: socket_parent_frame=../hand_l_reset_axis socket_child_frame=../hand_l_geom_6
      PhysicalOffsetFrame hand_l_reset_axis_offset: socket_parent=../hand_l_reset_axis translation=(0 0 0)
      PhysicalOffsetFrame hand_l_geom_6_offset: socket_parent=../hand_l_geom_6 translation=(0 0 0)
    WeldJoint hand_l_geom_7_joint: socket_parent_frame=../hand_l_reset_axis socket_child_frame=../hand_l_geom_7
      PhysicalOffsetFrame hand_l_reset_axis_offset: socket_parent=../hand_l_reset_axis translation=(0 0 0)
      PhysicalOffsetFrame hand_l_geom_7_offset: socket_parent=../hand_l_geom_7 translation=(0 0 0)
    WeldJoint hand_l_geom_8_joint: socket_parent_frame=../hand_l_reset_axis socket_child_frame=../hand_l_geom_8
      PhysicalOffsetFrame hand_l_reset_axis_offset: socket_parent=../hand_l_reset_axis translation=(0 0 0)
      PhysicalOffsetFrame hand_l_geom_8_offset: socket_parent=../hand_l_geom_8 translation=(0 0 0)
    WeldJoint hand_l_geom_9_joint: socket_parent_frame=../hand_l_reset_axis socket_child_frame=../hand_l_geom_9
      PhysicalOffsetFrame hand_l_reset_axis_offset: socket_parent=../hand_l_reset_axis translation=(0 0 0)
      PhysicalOffsetFrame hand_l_geom_9_offset: socket_parent=../hand_l_geom_9 translation=(0 0 0)
    WeldJoint hand_l_geom_10_joint: socket_parent_frame=../hand_l_reset_axis socket_child_frame=../hand_l_geom_10
      PhysicalOffsetFrame hand_l_reset_axis_offset: socket_parent=../hand_l_reset_axis translation=(0 0 0)
      PhysicalOffsetFrame hand_l_geom_10_offset: socket_parent=../hand_l_geom_10 translation=(0 0 0)
    WeldJoint hand_l_geom_11_joint: socket_parent_frame=../hand_l_reset_axis socket_child_frame=../hand_l_geom_11
      PhysicalOffsetFrame hand_l_reset_axis_offset: socket_parent=../hand_l_reset_axis translation=(0 0 0)
      PhysicalOffsetFrame hand_l_geom_11_offset: socket_parent=../hand_l_geom_11 translation=(0 0 0)
    WeldJoint hand_l_geom_12_joint: socket_parent_frame=../hand_l_reset_axis socket_child_frame=../hand_l_geom_12
      PhysicalOffsetFrame hand_l_reset_axis_offset: socket_parent=../hand_l_reset_axis translation=(0 0 0)
      PhysicalOffsetFrame hand_l_geom_12_offset: socket_parent=../hand_l_geom_12 translation=(0 0 0)
    WeldJoint hand_l_geom_13_joint: socket_parent_frame=../hand_l_reset_axis socket_child_frame=../hand_l_geom_13
      PhysicalOffsetFrame hand_l_reset_axis_offset: socket_parent=../hand_l_reset_axis translation=(0 0 0)
      PhysicalOffsetFrame hand_l_geom_13_offset: socket_parent=../hand_l_geom_13 translation=(0 0 0)
    WeldJoint hand_l_geom_14_joint: socket_parent_frame=../hand_l_reset_axis socket_child_frame=../hand_l_geom_14
      PhysicalOffsetFrame hand_l_reset_axis_offset: socket_parent=../hand_l_reset_axis translation=(0 0 0)
      PhysicalOffsetFrame hand_l_geom_14_offset: socket_parent=../hand_l_geom_14 translation=(0 0 0)
    WeldJoint hand_l_joint: socket_parent_frame=../hand_l_geom_14 socket_child_frame=../hand_l
      PhysicalOffsetFrame hand_l_geom_14_offset: socket_parent=../hand_l_geom_14 translation=(0 0 0)
      PhysicalOffsetFrame hand_l_offset: socket_parent=../hand_l translation=(0 0 0)
    WeldJoint fingers_l_parent_offset_joint: socket_parent_frame=../hand_l
        socket_child_frame=../fingers_l_parent_offset
      PhysicalOffsetFrame hand_l_offset: socket_parent=../hand_l translation=(0 -0.077 0.01)
      PhysicalOffsetFrame fingers_l_parent_offset_offset: socket_parent=../fingers_l_parent_offset translation=(0 0 0)
    WeldJoint fingers_l_translation_joint: socket_parent_frame=../fingers_l_parent_offset
        socket_child_frame=../fingers_l_translation
      PhysicalOffsetFrame fingers_l_parent_offset_offset: socket_parent=../fingers_l_parent_offset translation=(0 0 0)
      PhysicalOffsetFrame fingers_l_translation_offset: socket_parent=../fingers_l_translation translation=(0 0 0)
    CustomJoint fingers_l_rotation_transform_joint: socket_parent_frame=../fingers_l_translation
        socket_child_frame=../fingers_l_rotation_transform
      PhysicalOffsetFrame fingers_l_translation_offset: socket_parent=../fingers_l_translation translation=(0 0 0)
          orientation=(0 -1.570796 0)
      PhysicalOffsetFrame fingers_l_rotation_transform_offset: socket_parent=../fingers_l_rotation_transform
          translation=(0 0 0)
      Coordinate fingers_l_rotation_transform_rotX: default_value=0 range=(-1.5708 1.5708) clamped=false
      SpatialTransform: axes_held_at_zero=(rotation2 rotation3 translation1 translation2 translation3)
        TransformAxis rotation1: axis=(1 0 0)
    WeldJoint fingers_l_reset_axis_joint: socket_parent_frame=../fingers_l_rotation_transform
        socket_child_frame=../fingers_l_reset_axis
      PhysicalOffsetFrame fingers_l_rotation_transform_offset: socket_parent=../fingers_l_rotation_transform
          translation=(0 0 0) orientation=(1.570796 0 1.570796)
      PhysicalOffsetFrame fingers_l_reset_axis_offset: socket_parent=../fingers_l_reset_axis translation=(0 0 0)
    WeldJoint fingers_l_geom_2_joint: socket_parent_frame=../fingers_l_reset_axis
        socket_child_frame=../fingers_l_geom_2
      PhysicalOffsetFrame fingers_l_reset_axis_offset: socket_parent=../fingers_l_reset_axis translation=(0 0.09 -0.01)
      PhysicalOffsetFrame fingers_l_geom_2_offset: socket_parent=../fingers_l_geom_2 translation=(0 0 0)
    WeldJoint fingers_l_geom_3_joint: socket_parent_frame=../fingers_l_reset_axis
        socket_child_frame=../fingers_l_geom_3
      PhysicalOffsetFrame fingers_l_reset_axis_offset: socket_parent=../fingers_l_reset_axis translation=(0 0.09 -0.01)
      PhysicalOffsetFrame fingers_l_geom_3_offset: socket_parent=../fingers_l_geom_3 translation=(0 0 0)
    WeldJoint fingers_l_geom_4_joint: socket_parent_frame=../fingers_l_reset_axis
        socket_child_frame=../fingers_l_geom_4
      PhysicalOffsetFrame fingers_l_reset_axis_offset: socket_parent=../fingers_l_reset_axis translation=(0 0.09 -0.01)
      PhysicalOffsetFrame fingers_l_geom_4_offset: socket_parent=../fingers_l_geom_4 translation=(0 0 0)
    WeldJoint fingers_l_geom_5_joint: socket_parent_frame=../fingers_l_reset_axis
        socket_child_frame=../fingers_l_geom_5
      PhysicalOffsetFrame fingers_l_reset_axis_offset: socket_parent=../fingers_l_reset_axis translation=(0 0.09 -0.01)
      PhysicalOffsetFrame fingers_l_geom_5_offset: socket_parent=../fingers_l_geom_5 translation=(0 0 0)
    WeldJoint fingers_l_geom_6_joint: socket_parent_frame=../fingers_l_reset_axis
        socket_child_frame=../fingers_l_geom_6
      PhysicalOffsetFrame fingers_l_reset_axis_offset: socket_parent=../fingers_l_reset_axis translation=(0 0.09 -0.01)
      PhysicalOffsetFrame fingers_l_geom_6_offset: socket_parent=../fingers_l_geom_6 translation=(0 0 0)
    WeldJoint fingers_l_geom_7_joint: socket_parent_frame=../fingers_l_reset_axis
        socket_child_frame=../fingers_l_geom_7
      PhysicalOffsetFrame fingers_l_reset_axis_offset: socket_parent=../fingers_l_reset_axis translation=(0 0.09 -0.01)
      PhysicalOffsetFrame fingers_l_geom_7_offset: socket_parent=../fingers_l_geom_7 translation=(0 0 0)
    WeldJoint fingers_l_geom_8_joint: socket_parent_frame=../fingers_l_reset_axis
        socket_child_frame=../fingers_l_geom_8
      PhysicalOffsetFrame fingers_l_reset_axis_offset: socket_parent=../fingers_l_reset_axis translation=(0 0.09 -0.01)
      PhysicalOffsetFrame fingers_l_geom_8_offset: socket_parent=../fingers_l_geom_8 translation=(0 0 0)
    WeldJoint fingers_l_geom_9_joint: socket_parent_frame=../fingers_l_reset_axis
        socket_child_frame=../fingers_l_geom_9
      PhysicalOffsetFrame fingers_l_reset_axis_offset: socket_parent=../fingers_l_reset_axis translation=(0 0.09 -0.01)
      PhysicalOffsetFrame fingers_l_geom_9_offset: socket_parent=../fingers_l_geom_9 translation=(0 0 0)
    WeldJoint fingers_l_geom_10_joint: socket_parent_frame=../fingers_l_reset_axis
        socket_child_frame=../fingers_l_geom_10
      PhysicalOffsetFrame fingers_l_reset_axis_offset: socket_parent=../fingers_l_reset_axis translation=(0 0.09 -0.01)
      PhysicalOffsetFrame fingers_l_geom_10_offset: socket_parent=../fingers_l_geom_10 translation=(0 0 0)
    WeldJoint fingers_l_geom_11_joint: socket_parent_frame=../fingers_l_reset_axis
        socket_child_frame=../fingers_l_geom_11
      PhysicalOffsetFrame fingers_l_reset_axis_offset: socket_parent=../fingers_l_reset_axis translation=(0 0.09 -0.01)
      PhysicalOffsetFrame fingers_l_geom_11_offset: socket_parent=../fingers_l_geom_11 translation=(0 0 0)
    WeldJoint fingers_l_geom_12_joint: socket_parent_frame=../fingers_l_reset_axis
        socket_child_frame=../fingers_l_geom_12
      PhysicalOffsetFrame fingers_l_reset_axis_offset: socket_parent=../fingers_l_reset_axis translation=(0 0.09 -0.01)
      PhysicalOffsetFrame fingers_l_geom_12_offset: socket_parent=../fingers_l_geom_12 translation=(0 0 0)
    WeldJoint fingers_l_joint: socket_parent_frame=../fingers_l_geom_12 socket_child_frame=../fingers_l
      PhysicalOffsetFrame fingers_l_geom_12_offset: socket_parent=../fingers_l_geom_12 translation=(0 0 0)
      PhysicalOffsetFrame fingers_l_offset: socket_parent=../fingers_l translation=(0 0 0)
  MarkerSet:
    Marker RASIS: pelvis (0.02 0.015 0.128)
    Marker LASIS: pelvis (0.02 0.015 -0.128)
    Marker LPSIS: pelvis (-0.2 0.03 -0.04)
    Marker RPSIS: pelvis (-0.2 0.03 0.04)
    Marker RLFE: femur_r (0 -0.39 0.05)
    Marker RMFE: femur_r (0 -0.39 -0.055)
    Marker RGT: femur_r (-0.042 0 0.1)
    Marker RATT: tibia_r (0.058 -0.07 0.005)
    Marker RLM: tibia_r (-0.005 -0.42 0.055)
    Marker RSPH: tibia_r (0.006 -0.395 -0.045)
    Marker RCAL: calcn_r (-0.015 0.02 0)
    Marker RMFH1: calcn_r (0.19 0.015 -0.043)
    Marker RMFH5: calcn_r (0.145 0.01 0.053)
    Marker RTT2: toes_r (0.06 0.012 0.012)
    Marker LGT: femur_l (-0.042 0 -0.1)
    Marker LLFE: femur_l (0 -0.39 -0.05)
    Marker LMFE: femur_l (0 -0.39 0.055)
    Marker LATT: tibia_l (0.058 -0.07 0.005)
    Marker LLM: tibia_l (-0.005 -0.42 -0.055)
    Marker LSPH: tibia_l (0.006 -0.395 0.045)
    Marker LCAL: calcn_l (-0.015 0.02 0)
    Marker LMFH1: calcn_l (0.19 0.015 0.043)
    Marker LMFH5: calcn_l (0.145 0.01 -0.053)
    Marker LTT2: toes_l (0.06 0.012 -0.012)
    Marker STR: torso (0.1 0.22 0)
    Marker RA: torso (-0.03 0.42 0.15)
    Marker LA: torso (-0.03 0.42 -0.15)
    Marker C7: torso (-0.076 0.43 0)
    Marker T10: torso (-0.11 0.21 0)
    Marker SUP: torso (0.041 0.38 0)
    Marker SEL: head_and_neck (0.12 0.17 0.004)
    Marker OCC: head_and_neck (-0.1 0.14 0)
    Marker RTEMP: head_and_neck (0.02 0.15 0.1)
    Marker LTEMP: head_and_neck (0.02 0.15 -0.1)
    Marker HV: head_and_neck (0 0.23 0)
    Marker RLHE: humerus_r (0.025 -0.27 0.038)
    Marker RMHE: humerus_r (0.001 -0.28 -0.045)
    Marker RUS: radius_r (-0.015 -0.23 -0.018)
    Marker RRS: radius_r (-0.003 -0.23 0.05)
    Marker RHMH5: hand_r (-0.0021 -0.068 -0.048)
    Marker RHMH2: hand_r (0.0025 -0.082 0.034)
    Marker RFT3: fingers_r (0.03 -0.073 0)
    Marker LLHE: humerus_l (0.025 -0.27 -0.038)
    Marker LMHE: humerus_l (0.001 -0.28 0.045)
    Marker LUS: radius_l (-0.015 -0.23 0.018)
    Marker LRS: radius_l (-0.00316 -0.22312 -0.04988)
    Marker LHMH2: hand_l (0.0025 -0.082 -0.034)
    Marker LHMH5: hand_l (-0.0021 -0.068 0.048)
    Marker LFT3: fingers_l (0.03 -0.073 0)
  ForceSet:
    DeGrooteFregly2016Muscle ant_delt_r: max_isometric_force=1142.6 optimal_fiber_length=0.0976
        tendon_slack_length=0.093 pennation_angle_at_optimal=0.384 max_contraction_velocity=10
      PathPoint ant_delt_r_origin: humerus_r (0.009 -0.1188 0.0058)
      PathPoint DELT1-P2: humerus_r (0.01623 -0.11033 0.00412)
      PathPoint DELT1-P3: humerus_r (0.05 0.02 0)
      PathPoint ant_delt_r_insertion: torso (0.02 0.39 0.07)
    DeGrooteFregly2016Muscle post_delt_r: max_isometric_force=259.88 optimal_fiber_length=0.1367
        tendon_slack_length=0.038 pennation_angle_at_optimal=0.3142 max_contraction_velocity=10
      PathPoint post_delt_r_origin: humerus_r (0.009 -0.1188 0.0058)
      PathPoint DELT1-P2: humerus_r (-0.01623 -0.11033 0.00412)
      PathPoint DELT1-P3: torso (-0.07 0.3 0.15)
      PathPoint post_delt_r_insertion: torso (-0.07 0.35 0.1)
    DeGrooteFregly2016Muscle medial_delt_r: max_isometric_force=1142.6 optimal_fiber_length=0.0976
        tendon_slack_length=0.093 pennation_angle_at_optimal=0.384 max_contraction_velocity=10
      PathPoint medial_delt_r_origin: humerus_r (0.009 -0.1188 0.0058)
      PathPoint DELT1-P2: humerus_r (0.016 0.025 0.03)
      PathPoint medial_delt_r_insertion: torso (0.02 0.41 0.135)
    DeGrooteFregly2016Muscle LAT2: max_isometric_force=389.1 optimal_fiber_length=0.2324 tendon_slack_length=0.1765
        pennation_angle_at_optimal=0.3316 max_contraction_velocity=10
      PathPoint LAT2_origin: humerus_r (-0.005 -0.0407 -0.006)
      PathPoint P2: torso (-0.12 0.28 0.13)
      PathPoint P3: torso (-0.11 0.24 0.05)
      PathPoint LAT2_insertion: torso (-0.0719 0.18 0.008)
    DeGrooteFregly2016Muscle PECM2: max_isometric_force=515.41 optimal_fiber_length=0.1385 tendon_slack_length=0.089
        pennation_angle_at_optimal=0.4363 max_contraction_velocity=10
      PathPoint PECM2_origin: humerus_r (0.0127 -0.043 -0.008)
      PathPoint P2: torso (0.085 0.32 0.1)
      PathPoint P3: torso (0.085 0.32 0.05)
      PathPoint PECM2_insertion: torso (0.0277 0.32 0.023)
    DeGrooteFregly2016Muscle ant_delt_l: max_isometric_force=1142.6 optimal_fiber_length=0.0976
        tendon_slack_length=0.093 pennation_angle_at_optimal=0.384 max_contraction_velocity=10
      PathPoint ant_delt_l_origin: humerus_l (0.009 -0.1188 -0.0058)
      PathPoint DELT1-P2: humerus_l (0.01623 -0.11033 0.00412)
      PathPoint DELT1-P3: humerus_l (0.05 0.02 0)
      PathPoint ant_delt_l_insertion: torso (0.02 0.39 -0.07)
    DeGrooteFregly2016Muscle medial_delt_l: max_isometric_force=1142.6 optimal_fiber_length=0.0976
        tendon_slack_length=0.093 pennation_angle_at_optimal=0.384 max_contraction_velocity=10
      PathPoint medial_delt_l_origin: humerus_l (0.009 -0.1188 -0.0058)
      PathPoint DELT1-P2: humerus_l (0.016 0.025 -0.03)
      PathPoint medial_delt_l_insertion: torso (0.02 0.41 -0.135)
    DeGrooteFregly2016Muscle post_delt_l: max_isometric_force=259.88 optimal_fiber_length=0.1367
        tendon_slack_length=0.038 pennation_angle_at_optimal=0.3142 max_contraction_velocity=10
      PathPoint post_delt_l_origin: humerus_l (0.009 -0.1188 -0.0058)
      PathPoint DELT1-P2: humerus_l (-0.01623 -0.11033 -0.00412)
      PathPoint DELT1-P3: torso (-0.07 0.3 -0.15)
      PathPoint post_delt_l_insertion: torso (-0.07 0.35 -0.1)
    DeGrooteFregly2016Muscle LAT2_l: max_isometric_force=389.1 optimal_fiber_length=0.2324 tendon_slack_length=0.1765
        pennation_angle_at_optimal=0.3316 max_contraction_velocity=10
      PathPoint LAT2_l_origin: humerus_l (-0.005 -0.0407 0.006)
      PathPoint P2: torso (-0.12 0.28 -0.13)
      PathPoint P3: torso (-0.11 0.24 -0.05)
      PathPoint LAT2_l_insertion: torso (-0.0719 0.18 -0.008)
    DeGrooteFregly2016Muscle PECM2_l: max_isometric_force=515.41 optimal_fiber_length=0.1385 tendon_slack_length=0.089
        pennation_angle_at_optimal=0.4363 max_contraction_velocity=10
      PathPoint PECM2_l_origin: humerus_l (0.0127 -0.043 0.008)
      PathPoint PECM2-P2_l: torso (0.085 0.32 -0.1)
      PathPoint PECM2-P3_l: torso (0.085 0.32 -0.05)
      PathPoint PECM2_l_insertion: torso (0.0277 0.32 -0.023)
    DeGrooteFregly2016Muscle glut_med1_r: max_isometric_force=819 optimal_fiber_length=0.0535 tendon_slack_length=0.078
        pennation_angle_at_optimal=0.1396 max_contraction_velocity=10
      PathPoint glut_med1_r_origin: pelvis (-0.0408 0.0304 0.1209)
      PathPoint glut_med1_r_insertion: femur_r (-0.0218 -0.0117 0.0555)
    DeGrooteFregly2016Muscle semiten_r: max_isometric_force=410 optimal_fiber_length=0.201 tendon_slack_length=0.2555
        pennation_angle_at_optimal=0.0873 max_contraction_velocity=10
      PathPoint semiten_r_origin: pelvis (-0.1264 -0.1099 0.0604)
      PathPoint P2: tibia_r (-0.04203 -0.02859 -0.02277)
      PathPoint P3: tibia_r (-0.03322 -0.05282 -0.02288)
      PathPoint P4: tibia_r (-0.0113 -0.0746 -0.0245)
      PathPoint semiten_r_insertion: tibia_r (0.0027 -0.0956 -0.0193)
    DeGrooteFregly2016Muscle bifemlh_r: max_isometric_force=896 optimal_fiber_length=0.109 tendon_slack_length=0.326
        pennation_angle_at_optimal=0 max_contraction_velocity=10
      PathPoint bifemlh_r_origin: pelvis (-0.126 -0.1026 0.0694)
      PathPoint P2: tibia_r (-0.0301 -0.036 0.02943)
      PathPoint bifemlh_r_insertion: tibia_r (-0.0234 -0.0563 0.0343)
    DeGrooteFregly2016Muscle sar_r: max_isometric_force=156 optimal_fiber_length=0.52 tendon_slack_length=0.1
        pennation_angle_at_optimal=0 max_contraction_velocity=10
      PathPoint sar_r_origin: pelvis (-0.0153 -0.0013 0.1242)
      PathPoint P2: femur_r (-0.003 -0.3568 -0.0421)
      PathPoint P3: tibia_r (-0.0056 -0.0419 -0.0399)
      PathPoint P4: tibia_r (0.006 -0.0589 -0.0383)
      PathPoint sar_r_insertion: tibia_r (0.0243 -0.084 -0.0252)
    DeGrooteFregly2016Muscle tfl_r: max_isometric_force=233 optimal_fiber_length=0.095 tendon_slack_length=0.425
        pennation_angle_at_optimal=0.0524 max_contraction_velocity=10
      PathPoint tfl_r_origin: pelvis (-0.0311 0.0214 0.1241)
      PathPoint P2: femur_r (0.0294 -0.0995 0.0597)
      PathPoint P3: femur_r (0.0054 -0.4049 0.0357)
      PathPoint tfl_r_insertion: tibia_r (0.006 -0.0487 0.0297)
    DeGrooteFregly2016Muscle vas_med_r: max_isometric_force=1294 optimal_fiber_length=0.089 tendon_slack_length=0.126
        pennation_angle_at_optimal=0.0873 max_contraction_velocity=10
      PathPoint vas_med_r_origin: femur_r (0.014 -0.2099 0.0188)
      PathPoint P2: femur_r (0.0356 -0.2769 0.0009)
      PathPoint vas_med_r_insertion: tibia_r (0 0 0)
    DeGrooteFregly2016Muscle vas_lat_r: max_isometric_force=1871 optimal_fiber_length=0.084 tendon_slack_length=0.157
        pennation_angle_at_optimal=0.0873 max_contraction_velocity=10
      PathPoint vas_lat_r_origin: femur_r (0.0048 -0.1854 0.0349)
      PathPoint P2: femur_r (0.0269 -0.2591 0.0409)
      PathPoint vas_lat_r_insertion: tibia_r (0 0 0)
    DeGrooteFregly2016Muscle med_gas_r: max_isometric_force=1558 optimal_fiber_length=0.06 tendon_slack_length=0.39
        pennation_angle_at_optimal=0.2967 max_contraction_velocity=10
      PathPoint med_gas_r_origin: femur_r (-0.019 -0.3929 -0.0235)
      PathPoint P2: femur_r (-0.03 -0.4022 -0.0258)
      PathPoint med_gas_r_insertion: calcn_r (0 0.031 -0.0053)
    DeGrooteFregly2016Muscle lat_gas_r: max_isometric_force=683 optimal_fiber_length=0.064 tendon_slack_length=0.38
        pennation_angle_at_optimal=0.1396 max_contraction_velocity=10
      PathPoint lat_gas_r_origin: femur_r (-0.022 -0.3946 0.0272)
      PathPoint P2: femur_r (-0.03 -0.4018 0.0274)
      PathPoint lat_gas_r_insertion: calcn_r (0 0.031 -0.0053)
    DeGrooteFregly2016Muscle soleus_r: max_isometric_force=3549 optimal_fiber_length=0.05 tendon_slack_length=0.25
        pennation_angle_at_optimal=0.4363 max_contraction_velocity=10
      PathPoint soleus_r_origin: tibia_r (-0.0024 -0.1533 0.0071)
      PathPoint soleus_r_insertion: calcn_r (0 0.031 -0.0053)
    DeGrooteFregly2016Muscle tib_post_r: max_isometric_force=1588 optimal_fiber_length=0.031 tendon_slack_length=0.31
        pennation_angle_at_optimal=0.2094 max_contraction_velocity=10
      PathPoint tib_post_r_origin: tibia_r (-0.0094 -0.1348 0.0019)
      PathPoint P2: tibia_r (-0.0144 -0.4051 -0.0229)
      PathPoint P3: calcn_r (0.0417 0.0334 -0.0286)
      PathPoint tib_post_r_insertion: calcn_r (0.0772 0.0159 -0.0281)
    DeGrooteFregly2016Muscle tib_ant_r: max_isometric_force=905 optimal_fiber_length=0.098 tendon_slack_length=0.223
        pennation_angle_at_optimal=0.0873 max_contraction_velocity=10
      PathPoint tib_ant_r_origin: tibia_r (0.0179 -0.1624 0.0115)
      PathPoint P2: tibia_r (0.0329 -0.3951 -0.0177)
      PathPoint tib_ant_r_insertion: calcn_r (0.1166 0.0178 -0.0305)
    DeGrooteFregly2016Muscle per_long_r: max_isometric_force=943 optimal_fiber_length=0.049 tendon_slack_length=0.345
        pennation_angle_at_optimal=0.1745 max_contraction_velocity=10
      PathPoint per_long_r_origin: tibia_r (0.0005 -0.1568 0.0362)
      PathPoint P2: tibia_r (-0.0207 -0.4205 0.0286)
      PathPoint P3: tibia_r (-0.0162 -0.4319 0.0289)
      PathPoint P4: calcn_r (0.0438 0.023 0.0221)
      PathPoint P5: calcn_r (0.0681 0.0106 0.0284)
      PathPoint P6: calcn_r (0.0852 0.0069 0.0118)
      PathPoint per_long_r_insertion: calcn_r (0.1203 0.0085 -0.0184)
    DeGrooteFregly2016Muscle glut_med1_l: max_isometric_force=819 optimal_fiber_length=0.0535 tendon_slack_length=0.078
        pennation_angle_at_optimal=0.1396 max_contraction_velocity=10
      PathPoint glut_med1_l_origin: pelvis (-0.0408 0.0304 -0.1209)
      PathPoint glut_med1_l_insertion: femur_l (-0.0218 -0.0117 -0.0555)
    DeGrooteFregly2016Muscle semiten_l: max_isometric_force=410 optimal_fiber_length=0.201 tendon_slack_length=0.2555
        pennation_angle_at_optimal=0.0873 max_contraction_velocity=10
      PathPoint semiten_l_origin: pelvis (-0.1264 -0.1099 -0.0604)
      PathPoint P2: tibia_l (-0.04203 -0.02859 0.02277)
      PathPoint P3: tibia_l (-0.03322 -0.05282 0.02288)
      PathPoint P4: tibia_l (-0.0113 -0.0746 0.0245)
      PathPoint semiten_l_insertion: tibia_l (0.0027 -0.0956 0.0193)
    DeGrooteFregly2016Muscle bifemlh_l: max_isometric_force=896 optimal_fiber_length=0.109 tendon_slack_length=0.326
        pennation_angle_at_optimal=0 max_contraction_velocity=10
      PathPoint bifemlh_l_origin: pelvis (-0.126 -0.1026 -0.0694)
      PathPoint P2: tibia_l (-0.0301 -0.036 -0.02943)
      PathPoint bifemlh_l_insertion: tibia_l (-0.0234 -0.0563 -0.0343)
    DeGrooteFregly2016Muscle sar_l: max_isometric_force=156 optimal_fiber_length=0.52 tendon_slack_length=0.1
        pennation_angle_at_optimal=0 max_contraction_velocity=10
      PathPoint sar_l_origin: pelvis (-0.0153 -0.0013 -0.1242)
      PathPoint P2: femur_l (-0.003 -0.3568 0.0421)
      PathPoint P3: tibia_l (-0.0056 -0.0419 0.0399)
      PathPoint P4: tibia_l (0.006 -0.0589 0.0383)
      PathPoint sar_l_insertion: tibia_l (0.0243 -0.084 0.0252)
    DeGrooteFregly2016Muscle tfl_l: max_isometric_force=233 optimal_fiber_length=0.095 tendon_slack_length=0.425
        pennation_angle_at_optimal=0.0524 max_contraction_velocity=10
      PathPoint tfl_l_origin: pelvis (-0.0311 0.0214 -0.1241)
      PathPoint P2: femur_l (0.0294 -0.0995 -0.0597)
      PathPoint P3: femur_l (0.0054 -0.4049 -0.0357)
      PathPoint tfl_l_insertion: tibia_l (0.006 -0.0487 -0.0297)
    DeGrooteFregly2016Muscle vas_med_l: max_isometric_force=1294 optimal_fiber_length=0.089 tendon_slack_length=0.126
        pennation_angle_at_optimal=0.0873 max_contraction_velocity=10
      PathPoint vas_med_l_origin: femur_l (0.014 -0.2099 -0.0188)
      PathPoint P2: femur_l (0.0356 -0.2769 -0.0009)
      PathPoint vas_med_l_insertion: tibia_l (0 0 0)
    DeGrooteFregly2016Muscle vas_lat_l: max_isometric_force=1871 optimal_fiber_length=0.084 tendon_slack_length=0.157
        pennation_angle_at_optimal=0.0873 max_contraction_velocity=10
      PathPoint vas_lat_l_origin: femur_l (0.0048 -0.1854 -0.0349)
      PathPoint P2: femur_l (0.0269 -0.2591 -0.0409)
      PathPoint vas_lat_l_insertion: tibia_l (0 0 0)
    DeGrooteFregly2016Muscle med_gas_l: max_isometric_force=1558 optimal_fiber_length=0.06 tendon_slack_length=0.39
        pennation_angle_at_optimal=0.2967 max_contraction_velocity=10
      PathPoint med_gas_l_origin: femur_l (-0.019 -0.3929 0.0235)
      PathPoint P2: femur_l (-0.03 -0.4022 0.0258)
      PathPoint med_gas_l_insertion: calcn_l (0 0.031 0.0053)
    DeGrooteFregly2016Muscle lat_gas_l: max_isometric_force=683 optimal_fiber_length=0.064 tendon_slack_length=0.38
        pennation_angle_at_optimal=0.1396 max_contraction_velocity=10
      PathPoint lat_gas_l_origin: femur_l (-0.022 -0.3946 -0.0272)
      PathPoint P2: femur_l (-0.03 -0.4018 -0.0274)
      PathPoint lat_gas_l_insertion: calcn_l (0 0.031 0.0053)
    DeGrooteFregly2016Muscle soleus_l: max_isometric_force=3549 optimal_fiber_length=0.05 tendon_slack_length=0.25
        pennation_angle_at_optimal=0.4363 max_contraction_velocity=10
      PathPoint soleus_l_origin: tibia_l (-0.0024 -0.1533 -0.0071)
      PathPoint soleus_l_insertion: calcn_l (0 0.031 0.0053)
    DeGrooteFregly2016Muscle tib_post_l: max_isometric_force=1588 optimal_fiber_length=0.031 tendon_slack_length=0.31
        pennation_angle_at_optimal=0.2094 max_contraction_velocity=10
      PathPoint tib_post_l_origin: tibia_l (-0.0094 -0.1348 -0.0019)
      PathPoint P2: tibia_l (-0.0144 -0.4051 0.0229)
      PathPoint P3: calcn_l (0.0417 0.0334 0.0286)
      PathPoint tib_post_l_insertion: calcn_l (0.0772 0.0159 0.0281)
    DeGrooteFregly2016Muscle tib_ant_l: max_isometric_force=905 optimal_fiber_length=0.098 tendon_slack_length=0.223
        pennation_angle_at_optimal=0.0873 max_contraction_velocity=10
      PathPoint tib_ant_l_origin: tibia_l (0.0179 -0.1624 -0.0115)
      PathPoint P2: tibia_l (0.0329 -0.3951 0.0177)
      PathPoint tib_ant_l_insertion: calcn_l (0.1166 0.0178 0.0305)
    DeGrooteFregly2016Muscle per_long_l: max_isometric_force=943 optimal_fiber_length=0.049 tendon_slack_length=0.345
        pennation_angle_at_optimal=0.1745 max_contraction_velocity=10
      PathPoint per_long_l_origin: tibia_l (0.0005 -0.1568 -0.0362)
      PathPoint P2: tibia_l (-0.0207 -0.4205 -0.0286)
      PathPoint P3: tibia_l (-0.0162 -0.4319 -0.0289)
      PathPoint P4: calcn_l (0.0438 0.023 -0.0221)
      PathPoint P5: calcn_l (0.0681 0.0106 -0.0284)
      PathPoint P6: calcn_l (0.0852 0.0069 -0.0118)
      PathPoint per_long_l_insertion: calcn_l (0.1203 0.0085 0.0184)
    DeGrooteFregly2016Muscle ercspn_r: max_isometric_force=2500 optimal_fiber_length=0.12 tendon_slack_length=0.03
        pennation_angle_at_optimal=0 max_contraction_velocity=10
      PathPoint ercspn_r_origin: pelvis (-0.14 0.0439 0.0436)
      PathPoint ercspn_r_insertion: torso (-0.055 0.11 0.0241)
    DeGrooteFregly2016Muscle ercspn_l: max_isometric_force=2500 optimal_fiber_length=0.12 tendon_slack_length=0.03
        pennation_angle_at_optimal=0 max_contraction_velocity=10
      PathPoint ercspn_l_origin: pelvis (-0.14 0.0439 -0.0436)
      PathPoint ercspn_l_insertion: torso (-0.055 0.11 -0.0241)
    DeGrooteFregly2016Muscle rect_abd_r: max_isometric_force=263 optimal_fiber_length=0.2238 tendon_slack_length=0.017
        pennation_angle_at_optimal=0 max_contraction_velocity=10
      PathPoint rect_abd_r_origin: pelvis (-0.0416 -0.08 0.0107)
      PathPoint rect_abd_r_insertion: torso (0.0881 0.2226 0.0344)
    DeGrooteFregly2016Muscle rect_abd_l: max_isometric_force=263 optimal_fiber_length=0.2238 tendon_slack_length=0.017
        pennation_angle_at_optimal=0 max_contraction_velocity=10
      PathPoint rect_abd_l_origin: pelvis (-0.0416 -0.08 -0.0107)
      PathPoint rect_abd_l_insertion: torso (0.0881 0.2226 -0.0344)
    DeGrooteFregly2016Muscle r_stern_mast: max_isometric_force=68.95 optimal_fiber_length=0.108
        tendon_slack_length=0.0561 pennation_angle_at_optimal=0.2618 max_contraction_velocity=10
      PathPoint r_stern_mast_origin: torso (0.03 0.386 0.0096)
      PathPoint r_stern_mast_insertion: head_and_neck (0 0.085 0.0643)
    DeGrooteFregly2016Muscle l_stern_mast: max_isometric_force=68.95 optimal_fiber_length=0.108
        tendon_slack_length=0.0561 pennation_angle_at_optimal=0.2618 max_contraction_velocity=10
      PathPoint l_stern_mast_origin: torso (0.03 0.386 -0.0096)
      PathPoint l_stern_mast_insertion: head_and_neck (0 0.085 -0.0643)
    DeGrooteFregly2016Muscle TRIlong: max_isometric_force=798.52 optimal_fiber_length=0.134 tendon_slack_length=0.143
        pennation_angle_at_optimal=0.2094 max_contraction_velocity=10
      PathPoint TRIlong_origin: torso (-0.02 0.38 0.15)
      PathPoint P2: humerus_r (-0.02714 -0.11441 -0.00664)
      PathPoint P3: humerus_r (-0.03184 -0.22637 -0.01217)
      PathPoint P4: humerus_r (-0.01743 -0.26757 -0.01208)
      PathPoint TRIlong_insertion: ulna_r (-0.0219 0.0105 -0.0008)
    DeGrooteFregly2016Muscle TRIlong_l: max_isometric_force=798.52 optimal_fiber_length=0.134 tendon_slack_length=0.143
        pennation_angle_at_optimal=0.2094 max_contraction_velocity=10
      PathPoint TRIlong_l_origin: torso (-0.02 0.38 -0.15)
      PathPoint TRIlong-P2: humerus_l (-0.02714 -0.11441 0.00664)
      PathPoint TRIlong-P3: humerus_l (-0.03184 -0.22637 0.01217)
      PathPoint TRIlong-P4: humerus_l (-0.01743 -0.26757 0.01208)
      PathPoint TRIlong_l_insertion: ulna_l (-0.0219 0.0105 0.0008)
    DeGrooteFregly2016Muscle TRIlat: max_isometric_force=624.3 optimal_fiber_length=0.1138 tendon_slack_length=0.098
        pennation_angle_at_optimal=0.1571 max_contraction_velocity=10
      PathPoint TRIlat_origin: humerus_r (-0.006 -0.1265 0.0043)
      PathPoint P2: humerus_r (-0.02344 -0.14528 0.00928)
      PathPoint P3: humerus_r (-0.03184 -0.22637 -0.01217)
      PathPoint P4: humerus_r (-0.01743 -0.26757 -0.01208)
      PathPoint TRIlat_insertion: ulna_r (-0.0219 0.0105 -0.0008)
    DeGrooteFregly2016Muscle TRIlat_l: max_isometric_force=624.3 optimal_fiber_length=0.1138 tendon_slack_length=0.098
        pennation_angle_at_optimal=0.1571 max_contraction_velocity=10
      PathPoint TRIlat_l_origin: humerus_l (-0.006 -0.1265 -0.0043)
      PathPoint P2: humerus_l (-0.02344 -0.14528 -0.00928)
      PathPoint P3: humerus_l (-0.03184 -0.22637 0.01217)
      PathPoint P4: humerus_l (-0.01743 -0.26757 0.01208)
      PathPoint TRIlat_l_insertion: ulna_l (-0.0219 0.0105 0.0008)
    DeGrooteFregly2016Muscle BIClong: max_isometric_force=624.3 optimal_fiber_length=0.1157 tendon_slack_length=0.2723
        pennation_angle_at_optimal=0 max_contraction_velocity=10
      PathPoint BIClong_origin: torso (0.03 0.37 0.15)
      PathPoint P2: torso (0.03 0.385 0.16)
      PathPoint P3: humerus_r (0.02131 0.018 0.01)
      PathPoint P4: humerus_r (0.02378 -0.00511 0.01201)
      PathPoint P5: humerus_r (0.016 -0.028 0.00136)
      PathPoint P6: humerus_r (0.013 -0.077 -0.00165)
      PathPoint P7: humerus_r (0.01703 -0.12125 0.00024)
      PathPoint P8: humerus_r (0.0228 -0.1754 -0.0063)
      PathPoint BIClong_l-P9: humerus_r (0.035 -0.28 -0.006)
      PathPoint BIClong_insertion: radius_r (-0.002 -0.0375 -0.002)
    DeGrooteFregly2016Muscle BIClong_l: max_isometric_force=624.3 optimal_fiber_length=0.1157
        tendon_slack_length=0.2723 pennation_angle_at_optimal=0 max_contraction_velocity=10
      PathPoint BIClong_l_origin: torso (0.03 0.37 -0.15)
      PathPoint P2: torso (0.03 0.385 -0.16)
      PathPoint P3: humerus_l (0.02131 0.018 -0.01)
      PathPoint P4: humerus_l (0.02378 -0.00511 -0.01201)
      PathPoint P5: humerus_l (0.016 -0.028 -0.00136)
      PathPoint P6: humerus_l (0.013 -0.077 0.00165)
      PathPoint P7: humerus_l (0.01703 -0.12125 -0.00024)
      PathPoint P8: humerus_l (0.0228 -0.1754 0.0063)
      PathPoint P9: humerus_l (0.035 -0.28 0.006)
      PathPoint BIClong_l_insertion: radius_l (-0.002 -0.0375 0.002)
    DeGrooteFregly2016Muscle BRD: max_isometric_force=261.33 optimal_fiber_length=0.1726 tendon_slack_length=0.133
        pennation_angle_at_optimal=0 max_contraction_velocity=10
      PathPoint BRD_origin: humerus_r (0.01 -0.2 0.0022)
      PathPoint P2: radius_r (0 0.02 0.023)
      PathPoint BRD_insertion: radius_r (0 -0.23 0.04)
    DeGrooteFregly2016Muscle PT: max_isometric_force=566.22 optimal_fiber_length=0.098 tendon_slack_length=0.224
        pennation_angle_at_optimal=0.1745 max_contraction_velocity=10
      PathPoint PT_origin: humerus_r (0.0036 -0.2759 -0.0365)
      PathPoint P2: ulna_r (0 -0.035 -0.014)
      PathPoint P3: radius_r (0.01 -0.09 0.025)
      PathPoint PT_insertion: radius_r (-0.025 -0.13 0.03)
    DeGrooteFregly2016Muscle BRD_l: max_isometric_force=261.33 optimal_fiber_length=0.1726 tendon_slack_length=0.133
        pennation_angle_at_optimal=0 max_contraction_velocity=10
      PathPoint BRD_l_origin: humerus_l (0.01 -0.2 -0.0022)
      PathPoint P2: radius_l (0 0.02 -0.023)
      PathPoint BRD_l_insertion: radius_l (0 -0.23 -0.04)
    DeGrooteFregly2016Muscle PT_l: max_isometric_force=566.22 optimal_fiber_length=0.098 tendon_slack_length=0.224
        pennation_angle_at_optimal=0.1745 max_contraction_velocity=10
      PathPoint PT_l_origin: humerus_l (0.0036 -0.2759 0.036)
      PathPoint P2: ulna_l (0 -0.035 0.014)
      PathPoint P3: radius_l (0.01 -0.09 -0.025)
      PathPoint PT_l_insertion: radius_l (-0.025 -0.13 -0.03)
    DeGrooteFregly2016Muscle FCR: max_isometric_force=73.96 optimal_fiber_length=0.0628 tendon_slack_length=0.244
        pennation_angle_at_optimal=0.0541 max_contraction_velocity=10
      PathPoint FCR_origin: humerus_r (0.0076 -0.2781 -0.037)
      PathPoint P2: radius_r (0.004 -0.24 0.02)
      PathPoint FCR_insertion: hand_r (0.003 -0.02 0.02)
    DeGrooteFregly2016Muscle ECRL: max_isometric_force=304.89 optimal_fiber_length=0.081 tendon_slack_length=0.224
        pennation_angle_at_optimal=0 max_contraction_velocity=10
      PathPoint ECRL_origin: humerus_r (-0.0073 -0.2609 0.02)
      PathPoint P2: radius_r (-0.03 -0.13463 0.028)
      PathPoint P3: radius_r (-0.02 -0.237 0.036)
      PathPoint ECRL_insertion: hand_r (-0.003 -0.02 0.02)
    DeGrooteFregly2016Muscle FCR_l: max_isometric_force=73.96 optimal_fiber_length=0.0628 tendon_slack_length=0.244
        pennation_angle_at_optimal=0.0541 max_contraction_velocity=10
      PathPoint FCR_l_origin: humerus_l (0.0076 -0.2781 0.037)
      PathPoint P2: radius_l (0.004 -0.24 -0.02)
      PathPoint FCR_l_insertion: hand_l (0.003 -0.02 -0.02)
    DeGrooteFregly2016Muscle ECRL_l: max_isometric_force=304.89 optimal_fiber_length=0.081 tendon_slack_length=0.224
        pennation_angle_at_optimal=0 max_contraction_velocity=10
      PathPoint ECRL_l_origin: humerus_l (-0.0073 -0.2609 -0.02)
      PathPoint P2: radius_l (-0.03 -0.13463 -0.028)
      PathPoint P3: radius_l (-0.02 -0.237 -0.036)
      PathPoint ECRL_l_insertion: hand_l (-0.003 -0.02 -0.02)
